# OpenSim document version 40600
Model:
  Ground
  BodySet:
    Body BOX: mass=15.02844 [kg] mass_center=(0.209998 0.06368605 0.00176126)
        inertia=(0.271138 0.2334306 0.1634385 -2.22e-6 -3.3e-7 1.145e-5) meshes=BOX.STL
  JointSet:
    FreeJoint GtoBOX: socket_parent_frame=ground_offset socket_child_frame=BOX_offset
      Coordinate rx
      Coordinate ry
      Coordinate rz
      Coordinate tx
      Coordinate ty
      Coordinate tz
      PhysicalOffsetFrame ground_offset: socket_parent=/ground translation=(0 0 0) [meters]
      PhysicalOffsetFrame BOX_offset: socket_parent=/bodyset/BOX translation=(0.16 0.167248 0.205)
