# OpenSim document version 40600
Model:
  Ground
  BodySet:
    Body BOX: mass=15.02844 [kg] mass_center=(0.209998 0.06368605 0.00176126)
        inertia=(0.271138 0.2334306 0.1634385 -2.22e-6 -3.3e-7 1.145e-5) meshes=BOX.STL
  JointSet:
    FreeJoint GtoBOX: socket_parent_frame=ground_offset socket_child_frame=BOX_offset
      Coordinate rx
      Coordinate ry
      Coordinate rz
      Coordinate tx
      Coordinate ty
      Coordinate tz
      PhysicalOffsetFrame ground_offset: socket_parent=/ground translation=(0 0 0) [meters]
      PhysicalOffsetFrame BOX_offset: socket_parent=/bodyset/BOX translation=(0.16 0.167248 0.205)
  MarkerSet:
    Marker LTA_BOX: BOX (0.3496 0.295 0.01539)
    Marker LTP_BOX: BOX (0.0704 0.295 0.01539)
    Marker LBA_BOX: BOX (0.3496 0.015 -0.01461)
    Marker LBP_BOX: BOX (0.0704 0.015 -0.01461)
    Marker RTA_BOX: BOX (0.3496 0.295 0.39812)
    Marker RTP_BOX: BOX (0.0704 0.295 0.39812)
    Marker RBA_BOX: BOX (0.3496 0.015 0.42812)
    Marker RBP_BOX: BOX (0.0704 0.015 0.42812)
    Marker LHANDLE_BOX: BOX (0.21 0.1708 0.046745)
    Marker RHANDLE_BOX: BOX (0.21 0.1708 0.366825)
