# OpenSim document version 40000
ExternalLoads:
  datafile: E:\Dropbox\SEL\BOX\OpenSim\_Main_\c_AddBio_Continous\SUB1\OneCycle_TrcMot\15_10_trial2_12sec_10_ExtLoadAPP1.mot
  lowpass_cutoff_frequency_for_load_kinematics: -1
  ExternalForce righthand: applied_to_body=hand_r force_expressed_in_body=ground point_expressed_in_body=ground
      force_identifier=hand_force4_v point_identifier=hand_force4_p torque_identifier=hand_torque4_
  ExternalForce lefthand: applied_to_body=hand_l force_expressed_in_body=ground point_expressed_in_body=ground
      force_identifier=hand_force3_v point_identifier=hand_force3_p torque_identifier=hand_torque3_
  ExternalForce leftfoot: applied_to_body=calcn_l force_expressed_in_body=ground point_expressed_in_body=ground
      force_identifier=ground_force1_v point_identifier=ground_force1_p torque_identifier=ground_torque1_
  ExternalForce rightfoot: applied_to_body=calcn_r force_expressed_in_body=ground point_expressed_in_body=ground
      force_identifier=ground_force2_v point_identifier=ground_force2_p torque_identifier=ground_torque2_
