# OpenSim document version 40000
Model optimized_scale_and_markers:
  gravity: 0 -9.80665 0
  length_units: meters
  force_units: N
  credits:
    Delp S.L., Loan J.P., Hoy M.G., Zajac F.E., Topp E.L., Rosen J.M., Thelen D.G., Anderson F.C., Seth A., Hamner S.R., Arnold E., Raabe M.E., Beaucage-Gauvreau E., Brandon, S.C.E., Robertson, W.S.P, Freeman, B.J.C., Graham, R.B., Thewlis, D., Jones, C.F.
  publications:
    Notes: Raabe FBLS model adapted and validated for lifting tasks: https://doi.org/10.1080/10255842.2018.1564819. Validation of an OpenSim full-body model with detailed lumbar spine for estimating lower lumbar spine loads during symmetric and asymmetric lifting tasks.//Raabe Full Body model combines Hamner Full Body Model 2010, Christophy 2012 Lumbar DOF torso, and Arnold patella; 3D, 23 DOF gait model created by D.G. Thelen, Univ. of Wisconsin-Madison, and Samuel Hamner, Ajay Seth, Frank C. Anderson, and Scott L. Delp, Stanford University. Lower extremity joint defintions based on Delp et al. (1990). Low back joint and anthropometry based on Anderson and Pandy (1999, 2001). Planar knee model of Yamaguchi and Zajac (1989). Hamner added arms adapted from Holzbaur et al., 2005. Hamner, S.R., Seth, A, Delp, S.L.: Muscle contributions to propulsion and support during running. Journal of Biomechanics, 2010. Delp, S.L., Loan, J.P., Hoy, M.G., Zajac, F.E., Topp E.L., Rosen, J.M.: An interactive graphics-based model of the lower extremity to study orthopaedic surgical procedures, IEEE Transactions on Biomedical Engineering, vol. 37, pp. 757-767, 1990. Yamaguchi G.T., Zajac F.E.: A planar model of the knee joint to characterize the knee extensor mechanism." J . Biomech. vol. 21. pp. 1-10. 1989. Anderson F.C., Pandy M.G.: A dynamic optimization solution for vertical jumping in three dimensions. Computer Methods in Biomechanics and Biomedical Engineering 2:201-231, 1999. Anderson F.C., Pandy M.G.: Dynamic optimization of human walking. Journal of Biomechanical Engineering 123:381-390, 2001. Holzbaur, KR, WM Murray and SL Delp, 2005. A model of the upper extremity for simulating musculoskeletal surgery and analyzing neuromuscular control. Ann Biomed Eng 33(6): 829-840.
  defaults:
    CoordinateActuator default: optimal_force=300
    Thelen2003Muscle default: max_isometric_force=546 optimal_fiber_length=0.0535 tendon_slack_length=0.078
        pennation_angle_at_optimal=0 [radians] FmaxTendonStrain=0.033 FmaxMuscleStrain=0.6 KshapeActive=0.5
        KshapePassive=4 Af=0.3 Flen=1.8 activation_time_constant=0.01 [seconds]
        deactivation_time_constant=0.04 [seconds]
  Ground
  BodySet:
    Body pelvis: mass=11.77611 [kg] mass_center=(-0.0707 0 0) inertia=(0.1027922 0.0870934 0.05789561 0 0 0)
        meshes=(r_pelvis.vtp l_pelvis.vtp)
    Body sacrum: mass=9.99924e-5 mass_center=(0 0 0) inertia=(9.99924e-5 9.99924e-5 9.99924e-5 0 0 0) meshes=sacrum.vtp
    Body femur_r: mass=9.300695 mass_center=(0 -0.17 0) inertia=(0.1338898 0.03509734 0.1411893 0 0 0)
        meshes=femur_r.vtp
    Body patella_r: mass=0.073056 mass_center=(0.0018 0.0264 0) inertia=(2.432375e-6 1.111095e-5 1.111095e-5 0 0 0)
        meshes=r_patella.vtp
    Body tibia_r: mass=3.707219 mass_center=(0 -0.1867 0) inertia=(0.05039618 0.005099613 0.05109612 0 0 0)
        meshes=(tibia_r.vtp fibula_r.vtp)
    Body talus_r: mass=0.09999242 mass_center=(0 0 0) inertia=(0.0009999242 0.0009999242 0.0009999242 0 0 0)
        meshes=talus_rv.vtp
    Body calcn_r: mass=1.249905 mass_center=(0.1 0.03 0) inertia=(0.001399894 0.003899704 0.004099689 0 0 0)
        meshes=foot.vtp
    Body toes_r: mass=0.2165836 mass_center=(0.0346 0.006 -0.0175)
        inertia=(0.0006304522 0.0007304446 0.0009999242 0 0 0) meshes=bofoot.vtp
    Body femur_l: mass=9.300695 mass_center=(0 -0.17 0) inertia=(0.1338898 0.03509734 0.1411893 0 0 0)
        meshes=femur_l.vtp
    Body patella_l: mass=0.073056 mass_center=(0.0018 0.0264 0) inertia=(2.432375e-6 1.111095e-5 1.111095e-5 0 0 0)
        meshes=l_patella.vtp
    Body tibia_l: mass=3.707219 mass_center=(0 -0.1867 0) inertia=(0.05039618 0.005099613 0.05109612 0 0 0)
        meshes=(tibia_l.vtp fibula_l.vtp)
    Body talus_l: mass=0.09999242 mass_center=(0 0 0) inertia=(0.0009999242 0.0009999242 0.0009999242 0 0 0)
        meshes=talus_lv.vtp
    Body calcn_l: mass=1.249905 mass_center=(0.1 0.03 0) inertia=(0.001399894 0.003899704 0.004099689 0 0 0)
        meshes=l_foot.vtp
    Body toes_l: mass=0.2165836 mass_center=(0.0346 0.006 0.0175)
        inertia=(0.0006304522 0.0007304446 0.0009999242 0 0 0) meshes=l_bofoot.vtp
    Body lumbar5: mass=1.823862 mass_center=(0.01728 0.0183 0) inertia=(0.1782025 0.02172575 0.171473 0 0 0)
        meshes=lumbar5.vtp
    Body lumbar4: mass=1.798864 mass_center=(0.0186 0.0217953 0) inertia=(0.171195 0.02067763 0.1651655 0 0 0)
        meshes=lumbar4.vtp
    Body lumbar3: mass=1.669873 mass_center=(0.0178939 0.0232739 0) inertia=(0.157685 0.01990919 0.1524354 0 0 0)
        meshes=lumbar3.vtp
    Body lumbar2: mass=1.688872 mass_center=(0.0252462 0.0202124 0) inertia=(0.1626927 0.02197343 0.157693 0 0 0)
        meshes=lumbar2.vtp
    Body lumbar1: mass=1.676873 mass_center=(0.03274 0.0194073 0.00132891)
        inertia=(0.1626447 0.02412937 0.157915 0 0 0) meshes=lumbar1.vtp
    Body torso: mass=18.16622 mass_center=(-0.03 0.32 0) inertia=(1.1923 0.5133071 1.163112 0 0 0)
        meshes=(cerv1sm.vtp cerv2sm.vtp cerv3sm.vtp cerv4sm.vtp cerv5sm.vtp cerv6sm.vtp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)
      WrapCylinder Cylinder: translation=(-0.2635229 0.04700439 0) quadrant=all radius=0.207574 length=0.2787109
      WrapEllipsoid Chest_r: xyz_body_rotation=(0 -0.4 0.2) translation=(0 0.2467731 0.01071965) quadrant=z
          dimensions=(0.09276545 0.200211 0.1434874)
      WrapEllipsoid Chest_l: xyz_body_rotation=(0 0.4 0.2) translation=(0 0.2467731 -0.01071965) quadrant=-z
          dimensions=(0.09276545 0.200211 0.1434874)
    Body Abdomen: mass=0.0009999242 mass_center=(0.008 0 0) inertia=(1.7799e-6 5.8e-7 1.3599e-6 0 0 0)
      WrapEllipsoid Abdomen: translation=(0 0 0) quadrant=x dimensions=(0.01023442 0.0818657 0.05116507)
    Body humerus_r: mass=2.032346 mass_center=(0 -0.164502 0) inertia=(0.01194509 0.004120688 0.01340798 0 0 0)
        meshes=humerus_rv.vtp
    Body ulna_r: mass=0.6074539 mass_center=(0 -0.120525 0) inertia=(0.002961775 0.0006179531 0.003212756 0 0 0)
        meshes=ulna_rv.vtp
    Body radius_r: mass=0.6074539 mass_center=(0 -0.120525 0) inertia=(0.002961775 0.0006179531 0.003212756 0 0 0)
        meshes=radius_rv.vtp
    Body hand_r: mass=0.4574653 mass_center=(0 -0.068095 0) inertia=(0.0008919324 0.0005469585 0.001339898 0 0 0)
        meshes=(pisiform_rvs.vtp lunate_rvs.vtp scaphoid_rvs.vtp triquetrum_rvs.vtp hamate_rvs.vtp capitate_rvs.vtp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)
    Body humerus_l: mass=2.032346 mass_center=(0 -0.164502 0) inertia=(0.01194509 0.004120688 0.01340798 0 0 0)
        meshes=humerus_lv.vtp
    Body ulna_l: mass=0.6074539 mass_center=(0 -0.120525 0) inertia=(0.002961775 0.0006179531 0.003212756 0 0 0)
        meshes=ulna_lv.vtp
    Body radius_l: mass=0.6074539 mass_center=(0 -0.120525 0) inertia=(0.002961775 0.0006179531 0.003212756 0 0 0)
        meshes=radius_lv.vtp
    Body hand_l: mass=0.4574653 mass_center=(0 -0.068095 0) inertia=(0.0008919324 0.0005469585 0.001339898 0 0 0)
        meshes=(pisiform_lvs.vtp lunate_lvs.vtp scaphoid_lvs.vtp triquetrum_lvs.vtp hamate_lvs.vtp capitate_lvs.vtp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)
    Body box_15kg_half_l: mass=7.514212 mass_center=(0.209998 0.113023 0.126817)
        inertia=(0.0875367 0.0686869 0.0817151 -7.5e-7 1.13e-6 -0.0223)
        meshes=E:\Dropbox\Sanjabu\Analysis\Model\Design_Box\BOX_15.02kg_Half_L.STL
      PhysicalOffsetFrame box_15kg_half_l_offsetframe: socket_parent=.. translation=(0.21 0.11303 0.20676) [meters]
    Body box_15kg_half_r: mass=7.514231 mass_center=(0.2099979 0.1130287 0.08170488)
        inertia=(0.08755445 0.06869696 0.08172345 -1.47e-6 -1.35e-6 0.0223083)
        meshes=E:\Dropbox\Sanjabu\Analysis\Model\Design_Box\BOX_15.02kg_Half_R.STL
      PhysicalOffsetFrame box_15kg_half_r_offsetframe: socket_parent=.. translation=(0.21 0.11303 0.00176)
  JointSet:
    CustomJoint ground_pelvis: socket_parent_frame=ground_offset socket_child_frame=pelvis_offset
      Coordinate pelvis_tilt: default_value=0 range=(-3.141593 3.141593) clamped=false
      Coordinate pelvis_list: default_value=0 range=(-3.141593 3.141593) clamped=false
      Coordinate pelvis_rotation: default_value=0 range=(-3.141593 3.141593) clamped=false
      Coordinate pelvis_tx: default_value=0 range=(-5 5) clamped=false
      Coordinate pelvis_ty: default_value=0 range=(-1 2) clamped=false
      Coordinate pelvis_tz: default_value=0 range=(-3 3) clamped=false
      PhysicalOffsetFrame ground_offset: socket_parent=/ground translation=(0 0 0)
      PhysicalOffsetFrame pelvis_offset: socket_parent=/bodyset/pelvis translation=(0 0 0)
      SpatialTransform:
        TransformAxis rotation1: coordinates=pelvis_tilt axis=(0 0 1) LinearFunction(coefficients=1 0)
        TransformAxis rotation2: coordinates=pelvis_list axis=(1 0 0) LinearFunction(coefficients=1 0)
        TransformAxis rotation3: coordinates=pelvis_rotation axis=(0 1 0) LinearFunction(coefficients=1 0)
        TransformAxis translation1: coordinates=pelvis_tx axis=(1 0 0) LinearFunction(coefficients=1 0)
        TransformAxis translation2: coordinates=pelvis_ty axis=(0 1 0) LinearFunction(coefficients=1 0)
        TransformAxis translation3: coordinates=pelvis_tz axis=(0 0 1) LinearFunction(coefficients=1 0)
    WeldJoint sacrumjnt: socket_parent_frame=pelvis_offset socket_child_frame=sacrum_offset
      PhysicalOffsetFrame pelvis_offset: socket_parent=/bodyset/pelvis translation=(0.01084389 -0.01756081 0)
      PhysicalOffsetFrame sacrum_offset: socket_parent=/bodyset/sacrum translation=(0 0 0)
    CustomJoint hip_r: socket_parent_frame=pelvis_offset socket_child_frame=femur_r_offset
      Coordinate hip_flexion_r: default_value=0 range=(-2.4435 2.094395) clamped=false
      Coordinate hip_adduction_r: default_value=0 range=(-2.094395 2.094395) clamped=false
      Coordinate hip_rotation_r: default_value=0 range=(-2.094395 2.094395) clamped=false
      PhysicalOffsetFrame pelvis_offset: socket_parent=/bodyset/pelvis translation=(-0.07666633 -0.06828056 0.09113994)
      PhysicalOffsetFrame femur_r_offset: socket_parent=/bodyset/femur_r translation=(0 0 0)
      SpatialTransform: axes_held_at_zero=(translation1 translation2 translation3)
        TransformAxis rotation1: coordinates=hip_flexion_r axis=(0 0 1) LinearFunction(coefficients=1 0)
        TransformAxis rotation2: coordinates=hip_adduction_r axis=(1 0 0) LinearFunction(coefficients=1 0)
        TransformAxis rotation3: coordinates=hip_rotation_r axis=(0 1 0) LinearFunction(coefficients=1 0)
    CustomJoint patellofemoral_r: socket_parent_frame=femur_r_offset socket_child_frame=patella_r_offset
      Coordinate knee_angle_r_beta: default_value=0 range=(-99999.9 99999.9) clamped=false
      PhysicalOffsetFrame femur_r_offset: socket_parent=/bodyset/femur_r translation=(0 0 0)
      PhysicalOffsetFrame patella_r_offset: socket_parent=/bodyset/patella_r translation=(0 0 0)
      SpatialTransform: axes_held_at_zero=(rotation2 rotation3 translation3)
        TransformAxis rotation1: coordinates=knee_angle_r_beta axis=(0 0 1)
          SimmSpline: x=(0 0.174533 0.349066 0.523599 0.698132 0.872665 1.0472 1.22173 1.39626 1.5708 1.74533 1.91986 2.0944)
              y=(0.00113686 -0.00629212 -0.105582 -0.253683 -0.414245 -0.579047 -0.747244 -0.91799 -1.09044 -1.26379 -1.43763 -1.61186 -1.78634)
        TransformAxis translation1: coordinates=knee_angle_r_beta axis=(1 0 0)
          MultiplierFunction: scale=0.9791409
            SimmSpline: x=(0 0.174533 0.349066 0.523599 0.698132 0.872665 1.0472 1.22173 1.39626 1.5708 1.74533 1.91986 2.0944)
                y=(0.04435 0.040692 0.035581 0.029012 0.021473 0.013523 0.005483 -0.002412 -0.009959 -0.016903 -0.022926 -0.027739 -0.030815)
        TransformAxis translation2: coordinates=knee_angle_r_beta axis=(0 1 0)
          MultiplierFunction: scale=0.9769686
            SimmSpline: x=(0 0.174533 0.349066 0.523599 0.698132 0.872665 1.0472 1.22173 1.39626 1.5708 1.74533 1.91986 2.0944)
                y=(-0.418712 -0.426965 -0.43422 -0.440152 -0.444617 -0.447495 -0.448724 -0.448337 -0.446353 -0.442826 -0.438035 -0.432448 -0.426632)
    CustomJoint knee_r: socket_parent_frame=femur_r_offset socket_child_frame=tibia_r_offset
      Coordinate knee_angle_r: default_value=0 range=(-2.3562 0.1745329) clamped=false
      PhysicalOffsetFrame femur_r_offset: socket_parent=/bodyset/femur_r translation=(-0.004405994 -0.3867044 0)
      PhysicalOffsetFrame tibia_r_offset: socket_parent=/bodyset/tibia_r translation=(0 0 0)
      SpatialTransform: axes_held_at_zero=(rotation2 rotation3 translation3)
        TransformAxis rotation1: coordinates=knee_angle_r axis=(0 0 1) LinearFunction(coefficients=1 0)
        TransformAxis translation1: coordinates=knee_angle_r axis=(1 0 0)
          MultiplierFunction: scale=0.9791409
            SimmSpline: x=(-2.0944 -1.74533 -1.39626 -1.0472 -0.698132 -0.349066 -0.174533 0.197344 0.337395 0.490178 1.52146 2.0944)
                y=(0.00129986 0.00628986 0.00860986 0.00859986 0.00661986 0.00349986 0.00139986 -0.000727144 -0.000935143 -0.00107414 -0.000935143 -0.000750144)
        TransformAxis translation2: coordinates=knee_angle_r axis=(0 1 0)
          MultiplierFunction: scale=0.9769686
            SimmSpline: x=(-2.0944 -1.22173 -0.523599 -0.349066 -0.174533 0.159149 2.0944)
                y=(-0.0267793 -0.0123793 -0.0031793 -0.0017793 -0.000779304 0.000556696 -0.000179304)
    CustomJoint ankle_r: socket_parent_frame=tibia_r_offset socket_child_frame=talus_r_offset
      Coordinate ankle_angle_r: default_value=0 range=(-1.570796 1.570796) clamped=false
      PhysicalOffsetFrame tibia_r_offset: socket_parent=/bodyset/tibia_r translation=(0 -0.4377129 0)
      PhysicalOffsetFrame talus_r_offset: socket_parent=/bodyset/talus_r translation=(0 0 0)
      SpatialTransform: axes_held_at_zero=(rotation2 rotation3 translation1 translation2 translation3)
        TransformAxis rotation1: coordinates=ankle_angle_r axis=(-0.1050135 -0.1740224 0.9791263)
            LinearFunction(coefficients=1 0)
    CustomJoint subtalar_r: socket_parent_frame=talus_r_offset socket_child_frame=calcn_r_offset
      Coordinate subtalar_angle_r: default_value=0 range=(-1.570796 1.570796) clamped=true locked=true
      PhysicalOffsetFrame talus_r_offset: socket_parent=/bodyset/talus_r
          translation=(-0.04917926 -0.0423827 0.008001554)
      PhysicalOffsetFrame calcn_r_offset: socket_parent=/bodyset/calcn_r translation=(0 0 0)
      SpatialTransform: axes_held_at_zero=(rotation2 rotation3 translation1 translation2 translation3)
        TransformAxis rotation1: coordinates=subtalar_angle_r axis=(0.7871796 0.6047475 -0.1209495)
            LinearFunction(coefficients=1 0)
    CustomJoint mtp_r: socket_parent_frame=calcn_r_offset socket_child_frame=toes_r_offset
      Coordinate mtp_angle_r: default_value=0 range=(-1.570796 1.570796) clamped=true locked=true
      PhysicalOffsetFrame calcn_r_offset: socket_parent=/bodyset/calcn_r
          translation=(0.1869359 -0.002089225 0.001129706)
      PhysicalOffsetFrame toes_r_offset: socket_parent=/bodyset/toes_r translation=(0 0 0)
      SpatialTransform: axes_held_at_zero=(rotation2 rotation3 translation1 translation2 translation3)
        TransformAxis rotation1: coordinates=mtp_angle_r axis=(-0.5809544 0 0.8139361) LinearFunction(coefficients=1 0)
    CustomJoint hip_l: socket_parent_frame=pelvis_offset socket_child_frame=femur_l_offset
      Coordinate hip_flexion_l: default_value=0 range=(-2.4435 2.094395) clamped=false
      Coordinate hip_adduction_l: default_value=0 range=(-2.094395 2.094395) clamped=false
      Coordinate hip_rotation_l: default_value=0 range=(-2.094395 2.094395) clamped=false
      PhysicalOffsetFrame pelvis_offset: socket_parent=/bodyset/pelvis
          translation=(-0.07666633 -0.06828056 -0.09113994)
      PhysicalOffsetFrame femur_l_offset: socket_parent=/bodyset/femur_l translation=(0 0 0)
      SpatialTransform: axes_held_at_zero=(translation1 translation2 translation3)
        TransformAxis rotation1: coordinates=hip_flexion_l axis=(0 0 1) LinearFunction(coefficients=1 0)
        TransformAxis rotation2: coordinates=hip_adduction_l axis=(-1 0 0) LinearFunction(coefficients=1 0)
        TransformAxis rotation3: coordinates=hip_rotation_l axis=(0 -1 0) LinearFunction(coefficients=1 0)
    CustomJoint patellofemoral_l: socket_parent_frame=femur_l_offset socket_child_frame=patella_l_offset
      Coordinate knee_angle_l_beta: default_value=0 range=(-99999.9 99999.9) clamped=false
      PhysicalOffsetFrame femur_l_offset: socket_parent=/bodyset/femur_l translation=(0 0 0)
      PhysicalOffsetFrame patella_l_offset: socket_parent=/bodyset/patella_l translation=(0 0 0)
      SpatialTransform: axes_held_at_zero=(rotation2 rotation3 translation3)
        TransformAxis rotation1: coordinates=knee_angle_l_beta axis=(0 0 1)
          SimmSpline: x=(0 0.174533 0.349066 0.523599 0.698132 0.872665 1.0472 1.22173 1.39626 1.5708 1.74533 1.91986 2.0944)
              y=(0.00113686 -0.00629212 -0.105582 -0.253683 -0.414245 -0.579047 -0.747244 -0.91799 -1.09044 -1.26379 -1.43763 -1.61186 -1.78634)
        TransformAxis translation1: coordinates=knee_angle_l_beta axis=(1 0 0)
          MultiplierFunction: scale=0.9791409
            SimmSpline: x=(0 0.174533 0.349066 0.523599 0.698132 0.872665 1.0472 1.22173 1.39626 1.5708 1.74533 1.91986 2.0944)
                y=(0.04435 0.040692 0.035581 0.029012 0.021473 0.013523 0.005483 -0.002412 -0.009959 -0.016903 -0.022926 -0.027739 -0.030815)
        TransformAxis translation2: coordinates=knee_angle_l_beta axis=(0 1 0)
          MultiplierFunction: scale=0.9769686
            SimmSpline: x=(0 0.174533 0.349066 0.523599 0.698132 0.872665 1.0472 1.22173 1.39626 1.5708 1.74533 1.91986 2.0944)
                y=(-0.418712 -0.426965 -0.43422 -0.440152 -0.444617 -0.447495 -0.448724 -0.448337 -0.446353 -0.442826 -0.438035 -0.432448 -0.426632)
    CustomJoint knee_l: socket_parent_frame=femur_l_offset socket_child_frame=tibia_l_offset
      Coordinate knee_angle_l: default_value=0 range=(-2.3562 0.1745329) clamped=false
      PhysicalOffsetFrame femur_l_offset: socket_parent=/bodyset/femur_l translation=(-0.004405994 -0.3867044 0)
      PhysicalOffsetFrame tibia_l_offset: socket_parent=/bodyset/tibia_l translation=(0 0 0)
      SpatialTransform: axes_held_at_zero=(rotation2 rotation3 translation3)
        TransformAxis rotation1: coordinates=knee_angle_l axis=(0 0 1) LinearFunction(coefficients=1 0)
        TransformAxis translation1: coordinates=knee_angle_l axis=(1 0 0)
          MultiplierFunction: scale=0.9791409
            SimmSpline: x=(-2.0944 -1.74533 -1.39626 -1.0472 -0.698132 -0.349066 -0.174533 0.197344 0.337395 0.490178 1.52146 2.0944)
                y=(0.00129986 0.00628986 0.00860986 0.00859986 0.00661986 0.00349986 0.00139986 -0.000727144 -0.000935143 -0.00107414 -0.000935143 -0.000750144)
        TransformAxis translation2: coordinates=knee_angle_l axis=(0 1 0)
          MultiplierFunction: scale=0.9769686
            SimmSpline: x=(-2.0944 -1.22173 -0.523599 -0.349066 -0.174533 0.159149 2.0944)
                y=(-0.0267793 -0.0123793 -0.0031793 -0.0017793 -0.000779304 0.000556696 -0.000179304)
    CustomJoint ankle_l: socket_parent_frame=tibia_l_offset socket_child_frame=talus_l_offset
      Coordinate ankle_angle_l: default_value=0 range=(-1.047198 1.047198) clamped=false
      PhysicalOffsetFrame tibia_l_offset: socket_parent=/bodyset/tibia_l translation=(0 -0.4377129 0)
      PhysicalOffsetFrame talus_l_offset: socket_parent=/bodyset/talus_l translation=(0 0 0)
      SpatialTransform: axes_held_at_zero=(rotation2 rotation3 translation1 translation2 translation3)
        TransformAxis rotation1: coordinates=ankle_angle_l axis=(0.1050135 0.1740224 0.9791263)
            LinearFunction(coefficients=1 0)
    CustomJoint subtalar_l: socket_parent_frame=talus_l_offset socket_child_frame=calcn_l_offset
      Coordinate subtalar_angle_l: default_value=0 range=(-1.570796 1.570796) clamped=true locked=true
      PhysicalOffsetFrame talus_l_offset: socket_parent=/bodyset/talus_l
          translation=(-0.04917926 -0.0423827 -0.008001554)
      PhysicalOffsetFrame calcn_l_offset: socket_parent=/bodyset/calcn_l translation=(0 0 0)
      SpatialTransform: axes_held_at_zero=(rotation2 rotation3 translation1 translation2 translation3)
        TransformAxis rotation1: coordinates=subtalar_angle_l axis=(-0.7871796 -0.6047475 -0.1209495)
            LinearFunction(coefficients=1 0)
    CustomJoint mtp_l: socket_parent_frame=calcn_l_offset socket_child_frame=toes_l_offset
      Coordinate mtp_angle_l: default_value=0 range=(-1.047198 1.047198) clamped=true locked=true
      PhysicalOffsetFrame calcn_l_offset: socket_parent=/bodyset/calcn_l
          translation=(0.1869359 -0.002089225 -0.001129706)
      PhysicalOffsetFrame toes_l_offset: socket_parent=/bodyset/toes_l translation=(0 0 0)
      SpatialTransform: axes_held_at_zero=(rotation2 rotation3 translation1 translation2 translation3)
        TransformAxis rotation1: coordinates=mtp_angle_l axis=(0.5809544 0 0.8139361) LinearFunction(coefficients=1 0)
    CustomJoint L5_S1_IVDjnt: socket_parent_frame=sacrum_offset socket_child_frame=lumbar5_offset
      Coordinate L5_S1_Flex_Ext: default_value=0 range=(-0.1954769 0.06352998) clamped=false
      Coordinate L5_S1_Lat_Bending: default_value=0 range=(-0.03926991 0.03926991) clamped=false
      Coordinate L5_S1_axial_rotation: default_value=0 range=(-0.1759292 0.1759292) clamped=false
      PhysicalOffsetFrame sacrum_offset: socket_parent=/bodyset/sacrum translation=(-0.1102792 0.08050313 0)
      PhysicalOffsetFrame lumbar5_offset: socket_parent=/bodyset/lumbar5 translation=(0 0 0)
      SpatialTransform: axes_held_at_zero=(translation1 translation2 translation3)
        TransformAxis rotation1: coordinates=L5_S1_Flex_Ext axis=(0 0 1) LinearFunction(coefficients=1 0)
        TransformAxis rotation2: coordinates=L5_S1_Lat_Bending axis=(1 0 0) LinearFunction(coefficients=1 0)
        TransformAxis rotation3: coordinates=L5_S1_axial_rotation axis=(0 1 0) LinearFunction(coefficients=1 0)
    CustomJoint L4_L5_IVDjnt: socket_parent_frame=lumbar5_offset socket_child_frame=lumbar4_offset
      Coordinate L4_L5_Flex_Ext: default_value=0 range=(-99999.9 99999.9) clamped=false
      Coordinate L4_L5_Lat_Bending: default_value=0 range=(-99999.9 99999.9) clamped=false
      Coordinate L4_L5_axial_rotation: default_value=0 range=(-99999.9 99999.9) clamped=false
      PhysicalOffsetFrame lumbar5_offset: socket_parent=/bodyset/lumbar5 translation=(0.01079499 0.032018 0)
      PhysicalOffsetFrame lumbar4_offset: socket_parent=/bodyset/lumbar4 translation=(0.001033509 -0.002585512 0)
      SpatialTransform: axes_held_at_zero=(translation1 translation2 translation3)
        TransformAxis rotation1: coordinates=L4_L5_Flex_Ext axis=(0 0 1) LinearFunction(coefficients=1 0)
        TransformAxis rotation2: coordinates=L4_L5_Lat_Bending axis=(1 0 0) LinearFunction(coefficients=1 0)
        TransformAxis rotation3: coordinates=L4_L5_axial_rotation axis=(0 1 0) LinearFunction(coefficients=1 0)
    CustomJoint L3_L4_IVDjnt: socket_parent_frame=lumbar4_offset socket_child_frame=lumbar3_offset
      Coordinate L3_L4_Flex_Ext: default_value=0 range=(-99999.9 99999.9) clamped=false
      Coordinate L3_L4_Lat_Bending: default_value=0 range=(-99999.9 99999.9) clamped=false
      Coordinate L3_L4_axial_rotation: default_value=0 range=(-99999.9 99999.9) clamped=false
      PhysicalOffsetFrame lumbar4_offset: socket_parent=/bodyset/lumbar4 translation=(0 0.03309455 0)
      PhysicalOffsetFrame lumbar3_offset: socket_parent=/bodyset/lumbar3 translation=(-0.0005596012 -0.001111436 0)
      SpatialTransform: axes_held_at_zero=(translation1 translation2 translation3)
        TransformAxis rotation1: coordinates=L3_L4_Flex_Ext axis=(0 0 1) LinearFunction(coefficients=1 0)
        TransformAxis rotation2: coordinates=L3_L4_Lat_Bending axis=(1 0 0) LinearFunction(coefficients=1 0)
        TransformAxis rotation3: coordinates=L3_L4_axial_rotation axis=(0 1 0) LinearFunction(coefficients=1 0)
    CustomJoint L2_L3_IVD_jnt: socket_parent_frame=lumbar3_offset socket_child_frame=lumbar2_offset
      Coordinate L2_L3_Flex_Ext: default_value=0 range=(-99999.9 99999.9) clamped=false
      Coordinate L2_L3_Lat_Bending: default_value=0 range=(-99999.9 99999.9) clamped=false
      Coordinate L2_L3_axial_rotation: default_value=0 range=(-99999.9 99999.9) clamped=false
      PhysicalOffsetFrame lumbar3_offset: socket_parent=/bodyset/lumbar3 translation=(-0.007461349 0.02889734 0)
      PhysicalOffsetFrame lumbar2_offset: socket_parent=/bodyset/lumbar2 translation=(-0.001263087 -0.003790522 0)
      SpatialTransform: axes_held_at_zero=(translation1 translation2 translation3)
        TransformAxis rotation1: coordinates=L2_L3_Flex_Ext axis=(0 0 1) LinearFunction(coefficients=1 0)
        TransformAxis rotation2: coordinates=L2_L3_Lat_Bending axis=(1 0 0) LinearFunction(coefficients=1 0)
        TransformAxis rotation3: coordinates=L2_L3_axial_rotation axis=(0 1 0) LinearFunction(coefficients=1 0)
    CustomJoint L1_L2_IVD_jnt: socket_parent_frame=lumbar2_offset socket_child_frame=lumbar1_offset
      Coordinate L1_L2_Flex_Ext: default_value=0 range=(-99999.9 99999.9) clamped=false
      Coordinate L1_L2_Lat_Bending: default_value=0 range=(-99999.9 99999.9) clamped=false
      Coordinate L1_L2_axial_rotation: default_value=0 range=(-99999.9 99999.9) clamped=false
      PhysicalOffsetFrame lumbar2_offset: socket_parent=/bodyset/lumbar2 translation=(-0.009716056 0.02429822 0)
      PhysicalOffsetFrame lumbar1_offset: socket_parent=/bodyset/lumbar1 translation=(0.001341801 -0.003640657 0)
      SpatialTransform: axes_held_at_zero=(translation1 translation2 translation3)
        TransformAxis rotation1: coordinates=L1_L2_Flex_Ext axis=(0 0 1) LinearFunction(coefficients=1 0)
        TransformAxis rotation2: coordinates=L1_L2_Lat_Bending axis=(1 0 0) LinearFunction(coefficients=1 0)
        TransformAxis rotation3: coordinates=L1_L2_axial_rotation axis=(0 1 0) LinearFunction(coefficients=1 0)
    CustomJoint L1_T12_IVD_jnt: socket_parent_frame=lumbar1_offset socket_child_frame=torso_offset
      Coordinate L1_T12_Flex_Ext: default_value=0 range=(-99999.9 99999.9) clamped=false
      Coordinate L1_T12_Lat_Bending: default_value=0 range=(-99999.9 99999.9) clamped=false
      Coordinate L1_T12_axial_rotation: default_value=0 range=(-1.1 1.1) clamped=false
      PhysicalOffsetFrame lumbar1_offset: socket_parent=/bodyset/lumbar1 translation=(-0.009967661 0.02634686 0)
      PhysicalOffsetFrame torso_offset: socket_parent=/bodyset/torso translation=(-0.01634349 0.1356077 0)
      SpatialTransform: axes_held_at_zero=(translation1 translation2 translation3)
        TransformAxis rotation1: coordinates=L1_T12_Flex_Ext axis=(0 0 1) LinearFunction(coefficients=1 0)
        TransformAxis rotation2: coordinates=L1_T12_Lat_Bending axis=(1 0 0) LinearFunction(coefficients=1 0)
        TransformAxis rotation3: coordinates=L1_T12_axial_rotation axis=(0 1 0) LinearFunction(coefficients=1 0)
    CustomJoint Abdjnt: socket_parent_frame=sacrum_offset socket_child_frame=Abdomen_offset
      Coordinate Abs_r3: default_value=0 range=(-1.7 1.7) clamped=false
      Coordinate Abs_r2: default_value=0 range=(-1.7 1.7) clamped=false
      Coordinate Abs_r1: default_value=0 range=(-1.7 1.7) clamped=false
      Coordinate Abs_t1: default_value=0 range=(-99999.9 99999.9) clamped=false locked=true
      Coordinate Abs_t2: default_value=0 range=(-99999.9 99999.9) clamped=false locked=true
      PhysicalOffsetFrame sacrum_offset: socket_parent=/bodyset/sacrum translation=(-0.1102792 0.08050313 0)
      PhysicalOffsetFrame Abdomen_offset: socket_parent=/bodyset/Abdomen translation=(-0.09210981 -0.09209891 0)
      SpatialTransform: axes_held_at_zero=translation3
        TransformAxis rotation1: coordinates=Abs_r3 axis=(0 0 1) LinearFunction(coefficients=1 0)
        TransformAxis rotation2: coordinates=Abs_r2 axis=(1 0 0) LinearFunction(coefficients=1 0)
        TransformAxis rotation3: coordinates=Abs_r1 axis=(0 1 0) LinearFunction(coefficients=1 0)
        TransformAxis translation1: coordinates=Abs_t1 axis=(1 0 0) LinearFunction(coefficients=1 0)
        TransformAxis translation2: coordinates=Abs_t2 axis=(0 1 0) LinearFunction(coefficients=1 0)
    CustomJoint acromial_r: socket_parent_frame=torso_offset socket_child_frame=humerus_r_offset
      Coordinate arm_flex_r: default_value=0 range=(-1.570796 3.1416) clamped=true
      Coordinate arm_add_r: default_value=0 range=(-3.1416 1.570796) clamped=true
      Coordinate arm_rot_r: default_value=0 range=(-2.4435 1.7453) clamped=true
      PhysicalOffsetFrame torso_offset: socket_parent=/bodyset/torso translation=(0.003997186 0.4365533 0.1822341)
      PhysicalOffsetFrame humerus_r_offset: socket_parent=/bodyset/humerus_r translation=(0 0 0)
      SpatialTransform: axes_held_at_zero=(translation1 translation2 translation3)
        TransformAxis rotation1: coordinates=arm_flex_r axis=(0 0 1) LinearFunction(coefficients=1 0)
        TransformAxis rotation2: coordinates=arm_add_r axis=(1 0 0) LinearFunction(coefficients=1 0)
        TransformAxis rotation3: coordinates=arm_rot_r axis=(0 1 0) LinearFunction(coefficients=1 0)
    CustomJoint elbow_r: socket_parent_frame=humerus_r_offset socket_child_frame=ulna_r_offset
      Coordinate elbow_flex_r: default_value=0 range=(-0.1745 2.7925) clamped=true
      PhysicalOffsetFrame humerus_r_offset: socket_parent=/bodyset/humerus_r
          translation=(0.01289634 -0.2812401 -0.0094078)
      PhysicalOffsetFrame ulna_r_offset: socket_parent=/bodyset/ulna_r translation=(0 0 0)
      SpatialTransform: axes_held_at_zero=(rotation2 rotation3 translation1 translation2 translation3)
        TransformAxis rotation1: coordinates=elbow_flex_r axis=(0.226047 0.022269 0.9738618)
            LinearFunction(coefficients=1 0)
    CustomJoint radioulnar_r: socket_parent_frame=ulna_r_offset socket_child_frame=radius_r_offset
      Coordinate pro_sup_r: default_value=1.570781 range=(-1.5708 2.0944) clamped=true
      PhysicalOffsetFrame ulna_r_offset: socket_parent=/bodyset/ulna_r translation=(-0.006926389 -0.01340736 0.0267261)
      PhysicalOffsetFrame radius_r_offset: socket_parent=/bodyset/radius_r translation=(0 0 0)
      SpatialTransform: axes_held_at_zero=(rotation2 rotation3 translation1 translation2 translation3)
        TransformAxis rotation1: coordinates=pro_sup_r axis=(0.05639803 0.9984065 0.001952)
            LinearFunction(coefficients=1 0)
    CustomJoint radius_hand_r: socket_parent_frame=radius_r_offset socket_child_frame=hand_r_offset
      Coordinate wrist_flex_r: default_value=0 range=(-1.22173 1.22173) clamped=false
      Coordinate wrist_dev_r: default_value=0 range=(-0.4363323 0.6108652) clamped=false
      PhysicalOffsetFrame radius_r_offset: socket_parent=/bodyset/radius_r
          translation=(-0.009057744 -0.2431004 0.01394557)
      PhysicalOffsetFrame hand_r_offset: socket_parent=/bodyset/hand_r translation=(0 0 0)
      SpatialTransform: axes_held_at_zero=(rotation3 translation1 translation2 translation3)
        TransformAxis rotation1: coordinates=wrist_flex_r axis=(0 0 1) LinearFunction(coefficients=1 0)
        TransformAxis rotation2: coordinates=wrist_dev_r axis=(1 0 0) LinearFunction(coefficients=1 0)
    CustomJoint acromial_l: socket_parent_frame=torso_offset socket_child_frame=humerus_l_offset
      Coordinate arm_flex_l: default_value=0 range=(-1.570796 3.1416) clamped=true
      Coordinate arm_add_l: default_value=0 range=(-3.1416 1.570796) clamped=true
      Coordinate arm_rot_l: default_value=0 range=(-2.4435 1.7453) clamped=true
      PhysicalOffsetFrame torso_offset: socket_parent=/bodyset/torso translation=(0.003997186 0.4365533 -0.1822341)
      PhysicalOffsetFrame humerus_l_offset: socket_parent=/bodyset/humerus_l translation=(0 0 0)
      SpatialTransform: axes_held_at_zero=(translation1 translation2 translation3)
        TransformAxis rotation1: coordinates=arm_flex_l axis=(0 0 1) LinearFunction(coefficients=1 0)
        TransformAxis rotation2: coordinates=arm_add_l axis=(-1 0 0) LinearFunction(coefficients=1 0)
        TransformAxis rotation3: coordinates=arm_rot_l axis=(0 -1 0) LinearFunction(coefficients=1 0)
    CustomJoint elbow_l: socket_parent_frame=humerus_l_offset socket_child_frame=ulna_l_offset
      Coordinate elbow_flex_l: default_value=0 range=(-0.1745 2.7925) clamped=false
      PhysicalOffsetFrame humerus_l_offset: socket_parent=/bodyset/humerus_l
          translation=(0.01289634 -0.2812401 0.0094078)
      PhysicalOffsetFrame ulna_l_offset: socket_parent=/bodyset/ulna_l translation=(0 0 0)
      SpatialTransform: axes_held_at_zero=(rotation2 rotation3 translation1 translation2 translation3)
        TransformAxis rotation1: coordinates=elbow_flex_l axis=(-0.226047 -0.022269 0.9738618)
            LinearFunction(coefficients=1 0)
    CustomJoint radioulnar_l: socket_parent_frame=ulna_l_offset socket_child_frame=radius_l_offset
      Coordinate pro_sup_l: default_value=1.570781 range=(-1.5708 2.0944) clamped=true
      PhysicalOffsetFrame ulna_l_offset: socket_parent=/bodyset/ulna_l
          translation=(-0.006926389 -0.01340736 -0.0267261)
      PhysicalOffsetFrame radius_l_offset: socket_parent=/bodyset/radius_l translation=(0 0 0)
      SpatialTransform: axes_held_at_zero=(rotation2 rotation3 translation1 translation2 translation3)
        TransformAxis rotation1: coordinates=pro_sup_l axis=(-0.05639803 -0.9984065 0.001952)
            LinearFunction(coefficients=1 0)
    CustomJoint radius_hand_l: socket_parent_frame=radius_l_offset socket_child_frame=hand_l_offset
      Coordinate wrist_flex_l: default_value=0 range=(-1.22173 1.22173) clamped=false
      Coordinate wrist_dev_l: default_value=0 range=(-0.4363323 0.6108652) clamped=false
      PhysicalOffsetFrame radius_l_offset: socket_parent=/bodyset/radius_l
          translation=(-0.009057744 -0.2431004 -0.01394557)
      PhysicalOffsetFrame hand_l_offset: socket_parent=/bodyset/hand_l translation=(0 0 0)
      SpatialTransform: axes_held_at_zero=(rotation3 translation1 translation2 translation3)
        TransformAxis rotation1: coordinates=wrist_flex_l axis=(0 0 1) LinearFunction(coefficients=1 0)
        TransformAxis rotation2: coordinates=wrist_dev_l axis=(-1 0 0) LinearFunction(coefficients=1 0)
    WeldJoint handle_l: socket_parent_frame=hand_l_offset socket_child_frame=box_15kg_half_l_offset
      PhysicalOffsetFrame hand_l_offset: socket_parent=/bodyset/hand_l translation=(0 -0.09 0)
      PhysicalOffsetFrame box_15kg_half_l_offset: socket_parent=/bodyset/box_15kg_half_l translation=(0.21 0.1708 0)
          orientation=(-3.141593 -1.570793 -3.141593) [radians]
    WeldJoint handle_r: socket_parent_frame=hand_r_offset socket_child_frame=box_15kg_half_r_offset
      PhysicalOffsetFrame hand_r_offset: socket_parent=/bodyset/hand_r translation=(0 -0.09 0)
      PhysicalOffsetFrame box_15kg_half_r_offset: socket_parent=/bodyset/box_15kg_half_r
          translation=(0.21 0.1708 0.20857) orientation=(-3.141593 1.570793 -3.141593)
  ConstraintSet:
    CoordinateCouplerConstraint Abs_r3_con: independent_coordinate_names=L5_S1_Flex_Ext
        dependent_coordinate_name=Abs_r3 scale_factor=1
        coupled_coordinates_function=LinearFunction(coefficients=7.1429 0)
    CoordinateCouplerConstraint Abs_r1_con: independent_coordinate_names=L5_S1_axial_rotation
        dependent_coordinate_name=Abs_r1 scale_factor=1
        coupled_coordinates_function=LinearFunction(coefficients=5.5617 0)
    CoordinateCouplerConstraint Abs_r2_con: independent_coordinate_names=L5_S1_Lat_Bending
        dependent_coordinate_name=Abs_r2 scale_factor=1
        coupled_coordinates_function=LinearFunction(coefficients=11.3122 0)
    CoordinateCouplerConstraint L4_L5_Flex_Ext_con: independent_coordinate_names=L5_S1_Flex_Ext
        dependent_coordinate_name=L4_L5_Flex_Ext scale_factor=1
        coupled_coordinates_function=LinearFunction(coefficients=1.8571 0)
    CoordinateCouplerConstraint L4_L5_axial_rotation_con: independent_coordinate_names=L5_S1_axial_rotation
        dependent_coordinate_name=L4_L5_axial_rotation scale_factor=1
        coupled_coordinates_function=LinearFunction(coefficients=1.0625 0)
    CoordinateCouplerConstraint L4_L5_Lat_Bending_con: independent_coordinate_names=L5_S1_Lat_Bending
        dependent_coordinate_name=L4_L5_Lat_Bending scale_factor=1
        coupled_coordinates_function=LinearFunction(coefficients=1.33 0)
    CoordinateCouplerConstraint L3_L4_Flex_Ext_con: independent_coordinate_names=L5_S1_Flex_Ext
        dependent_coordinate_name=L3_L4_Flex_Ext scale_factor=1
        coupled_coordinates_function=LinearFunction(coefficients=1.6429 0)
    CoordinateCouplerConstraint L3_L4_axial_rotation_con: independent_coordinate_names=L5_S1_axial_rotation
        dependent_coordinate_name=L3_L4_axial_rotation scale_factor=1
        coupled_coordinates_function=LinearFunction(coefficients=1.0625 0)
    CoordinateCouplerConstraint L3_L4_Lat_Bending_con: independent_coordinate_names=L5_S1_Lat_Bending
        dependent_coordinate_name=L3_L4_Lat_Bending scale_factor=1
        coupled_coordinates_function=LinearFunction(coefficients=2.4314 0)
    CoordinateCouplerConstraint L2_L3_Flex_Ext_con: independent_coordinate_names=L5_S1_Flex_Ext
        dependent_coordinate_name=L2_L3_Flex_Ext scale_factor=1
        coupled_coordinates_function=LinearFunction(coefficients=1.1429 0)
    CoordinateCouplerConstraint L2_L3_axial_rotation_con: independent_coordinate_names=L5_S1_axial_rotation
        dependent_coordinate_name=L2_L3_axial_rotation scale_factor=1
        coupled_coordinates_function=LinearFunction(coefficients=0.875 0)
    CoordinateCouplerConstraint L2_L3_Lat_Bending_con: independent_coordinate_names=L5_S1_Lat_Bending
        dependent_coordinate_name=L2_L3_Lat_Bending scale_factor=1
        coupled_coordinates_function=LinearFunction(coefficients=2.4314 0)
    CoordinateCouplerConstraint L1_L2_Flex_Ext_con: independent_coordinate_names=L5_S1_Flex_Ext
        dependent_coordinate_name=L1_L2_Flex_Ext scale_factor=1
        coupled_coordinates_function=LinearFunction(coefficients=0.9286 0)
    CoordinateCouplerConstraint L1_L2_axial_rotation_con: independent_coordinate_names=L5_S1_axial_rotation
        dependent_coordinate_name=L1_L2_axial_rotation scale_factor=1
        coupled_coordinates_function=LinearFunction(coefficients=0.8125 0)
    CoordinateCouplerConstraint L1_L2_Lat_Bending_con: independent_coordinate_names=L5_S1_Lat_Bending
        dependent_coordinate_name=L1_L2_Lat_Bending scale_factor=1
        coupled_coordinates_function=LinearFunction(coefficients=2.0392 0)
    CoordinateCouplerConstraint L1_T12_axial_rotation: independent_coordinate_names=L5_S1_axial_rotation
        dependent_coordinate_name=L1_T12_axial_rotation scale_factor=1
        coupled_coordinates_function=LinearFunction(coefficients=0.75 0)
    CoordinateCouplerConstraint L1_T12_Flex_Ext_con: independent_coordinate_names=L5_S1_Flex_Ext
        dependent_coordinate_name=L1_T12_Flex_Ext scale_factor=1
        coupled_coordinates_function=LinearFunction(coefficients=0.5714 0)
    CoordinateCouplerConstraint L1_T12_Lat_Bending_con: independent_coordinate_names=L5_S1_Lat_Bending
        dependent_coordinate_name=L1_T12_Lat_Bending scale_factor=1
        coupled_coordinates_function=LinearFunction(coefficients=1.549 0)
    CoordinateCouplerConstraint patellofemoral_knee_angle_r_con: independent_coordinate_names=knee_angle_r
        dependent_coordinate_name=knee_angle_r_beta scale_factor=1
        coupled_coordinates_function=LinearFunction(coefficients=-1 0)
    CoordinateCouplerConstraint patellofemoral_knee_angle_l_con: independent_coordinate_names=knee_angle_l
        dependent_coordinate_name=knee_angle_l_beta scale_factor=1
        coupled_coordinates_function=LinearFunction(coefficients=-1 0)
    WeldConstraint: isEnforced=false socket_frame1=/bodyset/box_15kg_half_l/box_15kg_half_l_offsetframe
        socket_frame2=/bodyset/box_15kg_half_r/box_15kg_half_r_offsetframe
  ForceSet:
    Thelen2003Muscle rect_abd_r: max_isometric_force=662 optimal_fiber_length=0.3273548 tendon_slack_length=0.08901376
        pennation_angle_at_optimal=0 FmaxTendonStrain=0.033 FmaxMuscleStrain=0.6 KshapeActive=0.5 KshapePassive=4
        Af=0.3 Flen=1.8 activation_time_constant=0.01 deactivation_time_constant=0.04
      PathPoint rect_abd_r_P1: pelvis (-0.02819412 -0.07230922 0.01200646)
      PathPoint rect_abd_r_P2: torso (0.1165582 0.2608532 0.03323092)
    Thelen2003Muscle rect_abd_l: max_isometric_force=662 optimal_fiber_length=0.327332 tendon_slack_length=0.08900756
        pennation_angle_at_optimal=0 FmaxTendonStrain=0.033 FmaxMuscleStrain=0.6 KshapeActive=0.5 KshapePassive=4
        Af=0.3 Flen=1.8 activation_time_constant=0.01 deactivation_time_constant=0.04
      PathPoint rect_abd_l_P1: pelvis (-0.02819412 -0.07230922 -0.01200646)
      PathPoint rect_abd_l_P2: torso (0.1165582 0.2604784 -0.03323092)
    Thelen2003Muscle Ps_L1_VB_r: max_isometric_force=267.4139 optimal_fiber_length=0.202685
        tendon_slack_length=0.06019829 pennation_angle_at_optimal=0.18675
      PathPoint Ps_L1_VB_r_P1: lumbar1 (-0.009737159 0.02229423 0.01921125)
      PathPoint Ps_L1_VB_r_P2: pelvis (-0.02580847 -0.05888036 0.08284456)
    Thelen2003Muscle Ps_L1_TP_r: max_isometric_force=77.19164 optimal_fiber_length=0.200008
        tendon_slack_length=0.05936263 pennation_angle_at_optimal=0.18675
      PathPoint Ps_L1_TP_r_P1: lumbar1 (-0.02228347 0.01404374 0.02173292)
      PathPoint Ps_L1_TP_r_P2: pelvis (-0.02580847 -0.05888036 0.08284456)
    Thelen2003Muscle Ps_L1_L2_IVD_r: max_isometric_force=147.1507 optimal_fiber_length=0.1879762
        tendon_slack_length=0.05587626 pennation_angle_at_optimal=0.1867502
      PathPoint Ps_L1_L2_IVD_r_P1: lumbar1 (-0.001201506 0.003360882 0.0198677)
      PathPoint Ps_L1_L2_IVD_r_P2: pelvis (-0.02580847 -0.05888036 0.08284456)
    Thelen2003Muscle Ps_L2_TP_r: max_isometric_force=258.58 optimal_fiber_length=0.1757472
        tendon_slack_length=0.05225775 pennation_angle_at_optimal=0.1867502
      PathPoint Ps_L2_TP_r_P1: lumbar2 (-0.02100747 0.01417752 0.02165355)
      PathPoint Ps_L2_TP_r_P2: pelvis (-0.02580847 -0.05888036 0.08284456)
    Thelen2003Muscle Ps_L2_L3_IVD_r: max_isometric_force=150.5407 optimal_fiber_length=0.1631615
        tendon_slack_length=0.04849019 pennation_angle_at_optimal=0.1867502
      PathPoint Ps_L2_L3_IVD_r_P1: lumbar2 (0.001906795 0.003290163 0.02087389)
      PathPoint Ps_L2_L3_IVD_r_P2: pelvis (-0.02580847 -0.05888036 0.08284456)
    Thelen2003Muscle Ps_L3_TP_r: max_isometric_force=127.7698 optimal_fiber_length=0.1537319
        tendon_slack_length=0.04565762 pennation_angle_at_optimal=0.1867502
      PathPoint Ps_L3_TP_r_P1: lumbar3 (-0.02285644 0.01919849 0.02634988)
      PathPoint Ps_L3_TP_r_P2: pelvis (-0.02580847 -0.05888036 0.08284456)
    Thelen2003Muscle Ps_L3_L4_IVD_r: max_isometric_force=45.35878 optimal_fiber_length=0.139904
        tendon_slack_length=0.04159013 pennation_angle_at_optimal=0.1867502
      PathPoint Ps_L3_L4_IVD_r_P1: lumbar3 (0.001074369 0.005752266 0.0197236)
      PathPoint Ps_L3_L4_IVD_r_P2: pelvis (-0.02580847 -0.05888036 0.08284456)
    Thelen2003Muscle Ps_L4_TP_r: max_isometric_force=202.6902 optimal_fiber_length=0.1339516
        tendon_slack_length=0.03980277 pennation_angle_at_optimal=0.1867502
      PathPoint Ps_L4_TP_r_P1: lumbar4 (-0.01617338 0.02579968 0.02674021)
      PathPoint Ps_L4_TP_r_P2: pelvis (-0.02580847 -0.05888036 0.08284456)
    Thelen2003Muscle Ps_L4_L5_IVD_r: max_isometric_force=85.10187 optimal_fiber_length=0.1153179
        tendon_slack_length=0.03425393 pennation_angle_at_optimal=0.1867502
      PathPoint Ps_L4_L5_IVD_r_P1: lumbar4 (0.005601237 0.004082564 0.02128383)
      PathPoint Ps_L4_L5_IVD_r_P2: pelvis (-0.02580847 -0.05888036 0.08284456)
    Thelen2003Muscle Ps_L5_TP_r: max_isometric_force=186.3623 optimal_fiber_length=0.1140694
        tendon_slack_length=0.0338678 pennation_angle_at_optimal=0.1867502
      PathPoint Ps_L5_TP_r_P1: lumbar5 (-0.006066796 0.03152021 0.02728962)
      PathPoint Ps_L5_TP_r_P2: pelvis (-0.02580847 -0.05888036 0.08284456)
    Thelen2003Muscle Ps_L5_VB_r: max_isometric_force=232.8923 optimal_fiber_length=0.09976133
        tendon_slack_length=0.02960801 pennation_angle_at_optimal=0.1867502
      PathPoint Ps_L5_VB_r_P1: lumbar5 (0.01079499 0.01342376 0.02050383)
      PathPoint Ps_L5_VB_r_P2: pelvis (-0.02580847 -0.05888036 0.08284456)
    Thelen2003Muscle Ps_L1_VB_l: max_isometric_force=267.4139 optimal_fiber_length=0.202685
        tendon_slack_length=0.06019829 pennation_angle_at_optimal=0.18675
      PathPoint Ps_L1_VB_l_P1: lumbar1 (-0.009737159 0.02229423 -0.01921125)
      PathPoint Ps_L1_VB_l_P2: pelvis (-0.02580847 -0.05888036 -0.08284456)
    Thelen2003Muscle Ps_L1_TP_l: max_isometric_force=77.19164 optimal_fiber_length=0.200008
        tendon_slack_length=0.05936263 pennation_angle_at_optimal=0.18675
      PathPoint Ps_L1_TP_l_P1: lumbar1 (-0.02228347 0.01404374 -0.02173753)
      PathPoint Ps_L1_TP_l_P2: pelvis (-0.02580847 -0.05888036 -0.08284456)
    Thelen2003Muscle Ps_L1_L2_IVD_l: max_isometric_force=147.1507 optimal_fiber_length=0.1879762
        tendon_slack_length=0.05587625 pennation_angle_at_optimal=0.1867502
      PathPoint Ps_L1_L2_IVD_l_P1: lumbar1 (-0.001201506 0.003360882 -0.01986443)
      PathPoint Ps_L1_L2_IVD_l_P2: pelvis (-0.02580847 -0.05888036 -0.08284456)
    Thelen2003Muscle Ps_L2_TP_l: max_isometric_force=258.58 optimal_fiber_length=0.1757472
        tendon_slack_length=0.05225775 pennation_angle_at_optimal=0.1867502
      PathPoint Ps_L2_TP_l_P1: lumbar2 (-0.02100747 0.01417752 -0.02165453)
      PathPoint Ps_L2_TP_l_P2: pelvis (-0.02580847 -0.05888036 -0.08284456)
    Thelen2003Muscle Ps_L2_L3_IVD_l: max_isometric_force=150.5407 optimal_fiber_length=0.1631615
        tendon_slack_length=0.04849019 pennation_angle_at_optimal=0.1867502
      PathPoint Ps_L2_L3_IVD_l_P1: lumbar2 (0.001906795 0.003290163 -0.02087594)
      PathPoint Ps_L2_L3_IVD_l_P2: pelvis (-0.02580847 -0.05888036 -0.08284456)
    Thelen2003Muscle Ps_L3_TP_l: max_isometric_force=127.7698 optimal_fiber_length=0.1537319
        tendon_slack_length=0.04565762 pennation_angle_at_optimal=0.1867502
      PathPoint Ps_L3_TP_l_P1: lumbar3 (-0.02285644 0.01919849 -0.02634997)
      PathPoint Ps_L3_TP_l_P2: pelvis (-0.02580847 -0.05888036 -0.08284456)
    Thelen2003Muscle Ps_L3_L4_IVD_l: max_isometric_force=45.35878 optimal_fiber_length=0.1399039
        tendon_slack_length=0.04159011 pennation_angle_at_optimal=0.1867502
      PathPoint Ps_L3_L4_IVD_l_P1: lumbar3 (0.001074369 0.005752266 -0.01972052)
      PathPoint Ps_L3_L4_IVD_l_P2: pelvis (-0.02580847 -0.05888036 -0.08284456)
    Thelen2003Muscle Ps_L4_TP_l: max_isometric_force=202.6902 optimal_fiber_length=0.1339516
        tendon_slack_length=0.03980277 pennation_angle_at_optimal=0.1867502
      PathPoint Ps_L4_TP_l_P1: lumbar4 (-0.01617338 0.02579968 -0.02674352)
      PathPoint Ps_L4_TP_l_P2: pelvis (-0.02580847 -0.05888036 -0.08284456)
    Thelen2003Muscle Ps_L4_L5_IVD_l: max_isometric_force=85.10187 optimal_fiber_length=0.115318
        tendon_slack_length=0.03425395 pennation_angle_at_optimal=0.1867502
      PathPoint Ps_L4_L5_IVD_l_P1: lumbar4 (0.005601237 0.004082564 -0.02128734)
      PathPoint Ps_L4_L5_IVD_l_P2: pelvis (-0.02580847 -0.05888036 -0.08284456)
    Thelen2003Muscle Ps_L5_TP_l: max_isometric_force=186.3623 optimal_fiber_length=0.1140694
        tendon_slack_length=0.03386781 pennation_angle_at_optimal=0.1867502
      PathPoint Ps_L5_TP_l_P1: lumbar5 (-0.006066796 0.03152021 -0.02729167)
      PathPoint Ps_L5_TP_l_P2: pelvis (-0.02580847 -0.05888036 -0.08284456)
    Thelen2003Muscle Ps_L5_VB_l: max_isometric_force=232.8923 optimal_fiber_length=0.09976133
        tendon_slack_length=0.02960801 pennation_angle_at_optimal=0.1867502
      PathPoint Ps_L5_VB_l_P1: lumbar5 (0.01079499 0.01342376 -0.02050383)
      PathPoint Ps_L5_VB_l_P2: pelvis (-0.02580847 -0.05888036 -0.08284456)
    Thelen2003Muscle QL_post_I_1_L3_r: max_isometric_force=75.59353 optimal_fiber_length=0.05123963
        tendon_slack_length=0.04300883 pennation_angle_at_optimal=0.1291544
      PathPoint I_1_r_P1: pelvis (-0.1214516 0.07954014 0.06439828)
      PathPoint L3_TP_r_P2: lumbar3 (-0.02704739 0.01818124 0.0282521)
    Thelen2003Muscle QL_post_I_2_L4_r: max_isometric_force=156.4149 optimal_fiber_length=0.03087627
        tendon_slack_length=0.02599465 pennation_angle_at_optimal=0.1291544
      PathPoint I_2_r_P1: pelvis (-0.1149453 0.0836721 0.06876426)
      PathPoint L4_TP_r_P2: lumbar4 (-0.0227372 0.02694103 0.03131099)
    Thelen2003Muscle QL_post_I_2_L3_r: max_isometric_force=58.56422 optimal_fiber_length=0.04622839
        tendon_slack_length=0.03887387 pennation_angle_at_optimal=0.1291544
      PathPoint I_2_r_P1: pelvis (-0.1149453 0.0836721 0.06876426)
      PathPoint L3_TP_r_P2: lumbar3 (-0.02704739 0.01818124 0.0282521)
    Thelen2003Muscle QL_post_I_2_L2_r: max_isometric_force=36.55072 optimal_fiber_length=0.06266867
        tendon_slack_length=0.05268119 pennation_angle_at_optimal=0.1291544
      PathPoint I_2_r_P1: pelvis (-0.1149453 0.0836721 0.06876426)
      PathPoint L2_TP_r_P2: lumbar2 (-0.03011977 0.01166314 0.02948908)
    Thelen2003Muscle QL_post_I_3_L1_r: max_isometric_force=77.19129 optimal_fiber_length=0.08246016
        tendon_slack_length=0.06926653 pennation_angle_at_optimal=0.1291544
      PathPoint L1_TP_P1: lumbar1 (-0.03066973 0.01341295 0.030738)
      PathPoint I_3_r_P1: pelvis (-0.1062702 0.09193601 0.07203875)
    Thelen2003Muscle QL_post_I_3_L2_r: max_isometric_force=56.48747 optimal_fiber_length=0.06240098
        tendon_slack_length=0.05235056 pennation_angle_at_optimal=0.1291544
      PathPoint L2_TP_r_P2: lumbar2 (-0.03011977 0.01166314 0.02948908)
      PathPoint I_3_r_P1: pelvis (-0.1062702 0.09193601 0.07203875)
    Thelen2003Muscle QL_post_I_3_L3_r: max_isometric_force=96.36098 optimal_fiber_length=0.04712529
        tendon_slack_length=0.03956635 pennation_angle_at_optimal=0.1291544
      PathPoint L3_TP_r_P2: lumbar3 (-0.02704739 0.01818124 0.0282521)
      PathPoint I_3_r_P1: pelvis (-0.1062702 0.09193601 0.07203875)
    Thelen2003Muscle QL_post_I_1_L3_l: max_isometric_force=75.59353 optimal_fiber_length=0.0513904
        tendon_slack_length=0.04313538 pennation_angle_at_optimal=0.1291544
      PathPoint I.1_l_P1: pelvis (-0.1231617 0.0821221 -0.06352192)
      PathPoint L3_TP_l_P2: lumbar3 (-0.02704739 0.01852394 -0.0282521)
    Thelen2003Muscle QL_post_I_2_L4_l: max_isometric_force=156.4149 optimal_fiber_length=0.03084623
        tendon_slack_length=0.02596935 pennation_angle_at_optimal=0.1291544
      PathPoint I_2_l_P1: pelvis (-0.1149453 0.0836721 -0.06876426)
      PathPoint L4_TP_l_P2: lumbar4 (-0.0227372 0.02694103 -0.03100098)
    Thelen2003Muscle QL_post_I_2_L3_l: max_isometric_force=58.56422 optimal_fiber_length=0.04622839
        tendon_slack_length=0.03887387 pennation_angle_at_optimal=0.1291544
      PathPoint I_2_l_P1: pelvis (-0.1149453 0.0836721 -0.06876426)
      PathPoint L3_TP_l_P2: lumbar3 (-0.02704739 0.01818124 -0.0282521)
    Thelen2003Muscle QL_post_I_2_L2_l: max_isometric_force=36.55072 optimal_fiber_length=0.06266867
        tendon_slack_length=0.05268119 pennation_angle_at_optimal=0.1291544
      PathPoint I_2_l_P1: pelvis (-0.1149453 0.0836721 -0.06876426)
      PathPoint L2_TP_l_P2: lumbar2 (-0.03011977 0.01166314 -0.02948908)
    Thelen2003Muscle QL_post_I_3_L1_l: max_isometric_force=77.19129 optimal_fiber_length=0.0824404
        tendon_slack_length=0.06924994 pennation_angle_at_optimal=0.1291544
      PathPoint L1_TP_l_P1: lumbar1 (-0.03054465 0.01372738 -0.030738)
      PathPoint I_3_l_P1: pelvis (-0.1062702 0.09193601 -0.07203875)
    Thelen2003Muscle QL_post_I_3_L2_l: max_isometric_force=56.48747 optimal_fiber_length=0.06240098
        tendon_slack_length=0.05235056 pennation_angle_at_optimal=0.1291544
      PathPoint L2_TP_l_P2: lumbar2 (-0.03011977 0.01166314 -0.02948908)
      PathPoint I_3_l_P1: pelvis (-0.1062702 0.09193601 -0.07203875)
    Thelen2003Muscle QL_post_I_3_L3_l: max_isometric_force=96.36098 optimal_fiber_length=0.04712529
        tendon_slack_length=0.03956635 pennation_angle_at_optimal=0.1291544
      PathPoint L3_TP_l_P2: lumbar3 (-0.02704739 0.01818124 -0.0282521)
      PathPoint I_3_l_P1: pelvis (-0.1062702 0.09193601 -0.07203875)
    Thelen2003Muscle QL_mid_L3_12_3_r: max_isometric_force=41.93463 optimal_fiber_length=0.06367763
        tendon_slack_length=0.03307929 pennation_angle_at_optimal=0.1291544
      PathPoint quadratus_lumb_mid_L3_1_r_P1: torso (-0.05309923 0.1320471 0.05537772)
      PathPoint quadratus_lumb_mid_L3_1_r_P2: lumbar3 (-0.02738464 0.02012691 0.02832669)
    Thelen2003Muscle QL_mid_L3_12_2_r: max_isometric_force=47.71871 optimal_fiber_length=0.06862361
        tendon_slack_length=0.03560172 pennation_angle_at_optimal=0.1291544
      PathPoint quadratus_lumb_mid_L3_2_r_P2: torso (-0.0538172 0.1400989 0.04629817)
      PathPoint quadratus_lumb_mid_L3_2_r_P3: lumbar3 (-0.02738315 0.02012626 0.02832669)
    Thelen2003Muscle QL_mid_L3_12_1_r: max_isometric_force=79.53119 optimal_fiber_length=0.07021844
        tendon_slack_length=0.03644769 pennation_angle_at_optimal=0.1291544
      PathPoint quadratus_lumb_mid_L3_3_r_P2: torso (-0.05230486 0.1506491 0.03343459)
      PathPoint quadratus_lumb_mid_L3_3_r_P3: lumbar3 (-0.02738315 0.02012626 0.02832669)
    Thelen2003Muscle QL_mid_L2_12_1_r: max_isometric_force=156.0861 optimal_fiber_length=0.04985608
        tendon_slack_length=0.02589508 pennation_angle_at_optimal=0.1291544
      PathPoint QL_mid_L2-12_1_l_P1: torso (-0.05229916 0.1506491 0.03343459)
      PathPoint QL_mid_L2-12_1_l_P2: lumbar2 (-0.02829451 0.01642161 0.02493433)
    Thelen2003Muscle QL_mid_L4_12_3_r: max_isometric_force=42.09638 optimal_fiber_length=0.07592173
        tendon_slack_length=0.0393887 pennation_angle_at_optimal=0.1291544
      PathPoint quadratus_lumb_mid_L4_1_r_P1: torso (-0.05293579 0.1319836 0.05538844)
      PathPoint quadratus_lumb_mid_L4_1_r_P2: lumbar4 (-0.02209901 0.03175008 0.02899625)
    Thelen2003Muscle QL_mid_L3_12_3_l: max_isometric_force=41.93463 optimal_fiber_length=0.06367763
        tendon_slack_length=0.03307929 pennation_angle_at_optimal=0.1291544
      PathPoint quadratus_lumb_mid_L3_1_l_P1: torso (-0.05309923 0.1320471 -0.05537772)
      PathPoint quadratus_lumb_mid_L3_1_l_P2: lumbar3 (-0.02738464 0.02012691 -0.02832669)
    Thelen2003Muscle QL_mid_L3_12_2_l: max_isometric_force=47.71871 optimal_fiber_length=0.06862361
        tendon_slack_length=0.03560172 pennation_angle_at_optimal=0.1291544
      PathPoint quadratus_lumb_mid_L3_2_l_P2: torso (-0.0538172 0.1400989 -0.04629817)
      PathPoint quadratus_lumb_mid_L3_2_l_P3: lumbar3 (-0.02738315 0.02012626 -0.02832669)
    Thelen2003Muscle QL_mid_L3_12_1_l: max_isometric_force=79.53119 optimal_fiber_length=0.07021844
        tendon_slack_length=0.03644769 pennation_angle_at_optimal=0.1291544
      PathPoint quadratus_lumb_mid_L3_3_l_P2: torso (-0.05230486 0.1506491 -0.03343459)
      PathPoint quadratus_lumb_mid_L3_3_l_P3: lumbar3 (-0.02738315 0.02012626 -0.02832669)
    Thelen2003Muscle QL_mid_L2_12_1_l: max_isometric_force=156.0861 optimal_fiber_length=0.04985608
        tendon_slack_length=0.02589508 pennation_angle_at_optimal=0.1291544
      PathPoint QL_mid_L2-12_1_l_P1: torso (-0.05229916 0.1506491 -0.03343459)
      PathPoint QL_mid_L2-12_1_l_P2: lumbar2 (-0.02829451 0.01642161 -0.02493433)
    Thelen2003Muscle QL_mid_L4_12_3_l: max_isometric_force=42.09638 optimal_fiber_length=0.07592173
        tendon_slack_length=0.0393887 pennation_angle_at_optimal=0.1291544
      PathPoint quadratus_lumb_mid_L4_1_l_P1: torso (-0.05293579 0.1319836 -0.05538844)
      PathPoint quadratus_lumb_mid_L4_1_l_P2: lumbar4 (-0.02209901 0.03175008 -0.02899625)
    Thelen2003Muscle QL_ant_I_2_T12_r: max_isometric_force=45.39083 optimal_fiber_length=0.1219624
        tendon_slack_length=0.06331037 pennation_angle_at_optimal=0.1291544
      PathPoint I_2_r_P1: pelvis (-0.1149453 0.0836721 0.06876426)
      PathPoint T12_r_P2: torso (-0.01799152 0.1527643 0.0214393)
    Thelen2003Muscle QL_ant_I_3_T12_r: max_isometric_force=85.28362 optimal_fiber_length=0.1203742
        tendon_slack_length=0.06252239 pennation_angle_at_optimal=0.1291544
      PathPoint I_3_r_P1: pelvis (-0.1062702 0.09193601 0.07203875)
      PathPoint T12_r_P2: torso (-0.01266937 0.1539394 0.02036734)
    Thelen2003Muscle QL_ant_I_2_12_1_r: max_isometric_force=28.08042 optimal_fiber_length=0.1130321
        tendon_slack_length=0.05868366 pennation_angle_at_optimal=0.1291544
      PathPoint I_2_r_P2: pelvis (-0.1149453 0.0836721 0.06876426)
      PathPoint T12_1_r_P3: torso (-0.05194442 0.138663 0.0460945)
    Thelen2003Muscle QL_ant_I_3_12_1_r: max_isometric_force=53.17357 optimal_fiber_length=0.1126069
        tendon_slack_length=0.05849154 pennation_angle_at_optimal=0.1291544
      PathPoint I_3_r_P1: pelvis (-0.1062702 0.09193601 0.07203875)
      PathPoint T12_1_r_P2: torso (-0.05103311 0.1461848 0.04014509)
    Thelen2003Muscle QL_ant_I_3_12_2_r: max_isometric_force=35.24989 optimal_fiber_length=0.1069793
        tendon_slack_length=0.05556124 pennation_angle_at_optimal=0.1291544
      PathPoint I_3_r_P1: pelvis (-0.1062702 0.09193601 0.07203875)
      PathPoint T12_2_r_P2: torso (-0.05098154 0.1384984 0.04939615)
    Thelen2003Muscle QL_ant_I_3_12_3_r: max_isometric_force=40.627 optimal_fiber_length=0.09218059
        tendon_slack_length=0.04788328 pennation_angle_at_optimal=0.1291544
      PathPoint I_3_r_P2: pelvis (-0.1062702 0.09193601 0.07203875)
      PathPoint T12_3_r_P3: torso (-0.04815627 0.1308591 0.05844354)
    Thelen2003Muscle QL_ant_I_2_T12_l: max_isometric_force=45.39083 optimal_fiber_length=0.1220486
        tendon_slack_length=0.06335508 pennation_angle_at_optimal=0.1291544
      PathPoint I_2_l_P1: pelvis (-0.1149453 0.0836721 -0.06876426)
      PathPoint T12_l_P2: torso (-0.01266937 0.1539394 -0.02036734)
    Thelen2003Muscle QL_ant_I_3_T12_l: max_isometric_force=85.28362 optimal_fiber_length=0.1203742
        tendon_slack_length=0.06252239 pennation_angle_at_optimal=0.1291544
      PathPoint I_3_l_P1: pelvis (-0.1062702 0.09193601 -0.07203875)
      PathPoint T12_l_P2: torso (-0.01266937 0.1539394 -0.02036734)
    Thelen2003Muscle QL_ant_I_2_12_1_l: max_isometric_force=28.08042 optimal_fiber_length=0.1130321
        tendon_slack_length=0.05868366 pennation_angle_at_optimal=0.1291544
      PathPoint I_2_l_P2: pelvis (-0.1149453 0.0836721 -0.06876426)
      PathPoint T12_1_l_P3: torso (-0.05194442 0.138663 -0.0460945)
    Thelen2003Muscle QL_ant_I_3_12_1_l: max_isometric_force=53.17357 optimal_fiber_length=0.1125627
        tendon_slack_length=0.05846858 pennation_angle_at_optimal=0.1291544
      PathPoint I_3_l_P1: pelvis (-0.1062702 0.09193601 -0.07203875)
      PathPoint T12_1_l_P2: torso (-0.05067748 0.1457136 -0.03966271)
    Thelen2003Muscle QL_ant_I_3_12_2_l: max_isometric_force=35.24989 optimal_fiber_length=0.1069793
        tendon_slack_length=0.05556124 pennation_angle_at_optimal=0.1291544
      PathPoint I_3_l_P1: pelvis (-0.1062702 0.09193601 -0.07203875)
      PathPoint T12_2_l_P2: torso (-0.05098154 0.1384984 -0.04939615)
    Thelen2003Muscle QL_ant_I_3_12_3_l: max_isometric_force=40.627 optimal_fiber_length=0.09215031
        tendon_slack_length=0.04786755 pennation_angle_at_optimal=0.1291544
      PathPoint I_3_l_P2: pelvis (-0.1062702 0.09193601 -0.07203875)
      PathPoint T12_3_l_P3: torso (-0.0481436 0.1304372 -0.05895808)
    Thelen2003Muscle MF_m1s_r: max_isometric_force=81.19739 optimal_fiber_length=0.05010383
        tendon_slack_length=0.02082968 pennation_angle_at_optimal=0
      PathPoint MF_m1s_r_P1: lumbar4 (-0.0341058 0.03350316 0.01805745)
      PathPoint MF_m1s_r_P2: lumbar1 (-0.03546187 -0.01245488 0.002881687)
    Thelen2003Muscle MF_m1t_1_r: max_isometric_force=71.96337 optimal_fiber_length=0.0838205
        tendon_slack_length=0.02513659 pennation_angle_at_optimal=0
      PathPoint MF_m1t_1_r_P1: lumbar5 (-0.02158998 0.04218588 0.01898719)
      PathPoint MF_m1t_1_r_P2: lumbar1 (-0.04217087 -0.01533349 0.002974247)
    Thelen2003Muscle MF_m1t_2_r: max_isometric_force=59.72683 optimal_fiber_length=0.1061308
        tendon_slack_length=0.03183925 pennation_angle_at_optimal=0
      PathPoint MF_m1t_2_r_P1: sacrum (-0.1366382 0.09521661 0.02369837)
      PathPoint MF_m1t_2_r_P2: lumbar1 (-0.04217087 -0.01532908 0.002977744)
    Thelen2003Muscle MF_m1t_3_r: max_isometric_force=99.76112 optimal_fiber_length=0.126701
        tendon_slack_length=0.03801029 pennation_angle_at_optimal=0
      PathPoint MF_m1t_3_r_P1: pelvis (-0.1432825 0.05611164 0.05239193)
      PathPoint MF_m1t_3_r_P2: lumbar1 (-0.04217087 -0.01532908 0.002977744)
    Thelen2003Muscle MF_m2s_r: max_isometric_force=54.47881 optimal_fiber_length=0.05231528
        tendon_slack_length=0.02026028 pennation_angle_at_optimal=0
      PathPoint MF_m2s_r_P1: lumbar5 (-0.02158998 0.04326757 0.01706383)
      PathPoint MF_m2s_r_P2: lumbar2 (-0.03983583 -0.01142901 0.003892948)
    Thelen2003Muscle MF_m2t_1_r: max_isometric_force=57.47237 optimal_fiber_length=0.073739
        tendon_slack_length=0.02243801 pennation_angle_at_optimal=0
      PathPoint MF_m2t_1_r_P1: sacrum (-0.1358888 0.09662428 0.02306123)
      PathPoint MF_m2t_1_r_P2: lumbar2 (-0.04372225 -0.01787377 0.003892948)
    Thelen2003Muscle MF_m2t_2_r: max_isometric_force=145.8914 optimal_fiber_length=0.1030649
        tendon_slack_length=0.03133878 pennation_angle_at_optimal=0
      PathPoint MF_m2t_2_r_P1: pelvis (-0.1453082 0.05061645 0.05130032)
      PathPoint MF_m2t_2_r_P2: lumbar2 (-0.04372225 -0.01787377 0.003542583)
    Thelen2003Muscle MF_m2t_3_r: max_isometric_force=161.1852 optimal_fiber_length=0.1144309
        tendon_slack_length=0.03485538 pennation_angle_at_optimal=0
      PathPoint MF_m2t_3_r_P1: pelvis (-0.1485613 0.0371876 0.04911733)
      PathPoint MF_m2t_3_r_P2: lumbar2 (-0.04275065 -0.01821229 0.002302037)
    Thelen2003Muscle MF_m3s_r: max_isometric_force=83.72206 optimal_fiber_length=0.04932976
        tendon_slack_length=0.02052788 pennation_angle_at_optimal=0
      PathPoint MF_m3s_r_P1: sacrum (-0.1372864 0.09524314 0.02144139)
      PathPoint MF_m3s_r_P2: lumbar3 (-0.03917208 -0.005977008 0.002710831)
    Thelen2003Muscle MF_m3t_1_r: max_isometric_force=90.97846 optimal_fiber_length=0.1271743
        tendon_slack_length=0.04227871 pennation_angle_at_optimal=0
      PathPoint MF_m3t_1_r_P1: pelvis (-0.1668821 0.002157501 0.01785819)
      PathPoint MF_m3t_1_r_P2: lumbar3 (-0.04476809 -0.009470548 0.0015498)
    Thelen2003Muscle MF_m3t_2_r: max_isometric_force=90.97846 optimal_fiber_length=0.1087772
        tendon_slack_length=0.03622086 pennation_angle_at_optimal=0
      PathPoint MF_m3t_2_r_P1: pelvis (-0.1594627 0.02203035 0.02413527)
      PathPoint MF_m3t_2_r_P2: lumbar3 (-0.04476809 -0.009474994 0.002480217)
    Thelen2003Muscle MF_m3t_3_r: max_isometric_force=90.97846 optimal_fiber_length=0.1087417
        tendon_slack_length=0.03620905 pennation_angle_at_optimal=0
      PathPoint MF_m3t_3_r_P1: pelvis (-0.1594052 0.02169277 0.02401292)
      PathPoint MF_m3t_3_r_P2: lumbar3 (-0.04476809 -0.009474994 0.002480217)
    Thelen2003Muscle MF_m4s_r: max_isometric_force=101.066 optimal_fiber_length=0.0482496
        tendon_slack_length=0.03047935 pennation_angle_at_optimal=0
      PathPoint MF_m4s_r_P1: sacrum (-0.161693 0.06203265 0.02031289)
      PathPoint MF_m4s_r_P2: lumbar4 (-0.03720633 -0.0002225815 0.002317675)
    Thelen2003Muscle MF_m4t_1_r: max_isometric_force=90.11722 optimal_fiber_length=0.06925764
        tendon_slack_length=0.0280409 pennation_angle_at_optimal=0
      PathPoint MF_m4t_1_r_P1: sacrum (-0.1713075 0.04708469 0.0173322)
      PathPoint MF_m4t_1_r_P2: lumbar4 (-0.04444089 0.0001739636 0.002976281)
    Thelen2003Muscle MF_m4t_2_r: max_isometric_force=90.11722 optimal_fiber_length=0.09055988
        tendon_slack_length=0.03669821 pennation_angle_at_optimal=0
      PathPoint MF_m4t_2_r_P1: pelvis (-0.1637428 0.008263911 0.01746394)
      PathPoint MF_m4t_2_r_P2: lumbar4 (-0.0454744 0.0001758148 0.002976095)
    Thelen2003Muscle MF_m4t_3_r: max_isometric_force=90.11722 optimal_fiber_length=0.1023435
        tendon_slack_length=0.04140613 pennation_angle_at_optimal=0
      PathPoint MF_m4t_3_r_P1: pelvis (-0.1735023 -0.004131955 0.01528095)
      PathPoint MF_m4t_3_r_P2: lumbar4 (-0.04650791 0.0001758148 0.002976095)
    Thelen2003Muscle MF_m5s_r: max_isometric_force=34.87635 optimal_fiber_length=0.01625998
        tendon_slack_length=0.01028693 pennation_angle_at_optimal=0
      PathPoint MF_m5s_r_P1: sacrum (-0.1468008 0.07514037 0.01354193)
      PathPoint MF_m5s_r_P2: lumbar5 (-0.03346447 0.01838872 0.004240343)
    Thelen2003Muscle MF_m5t_1_r: max_isometric_force=34.87635 optimal_fiber_length=0.08600316
        tendon_slack_length=0.03474075 pennation_angle_at_optimal=0
      PathPoint MF_m5t_1_r_P1: sacrum (-0.1958773 0.005929135 0.01132229)
      PathPoint MF_m5t_1_r_P2: lumbar5 (-0.03833302 0.01824052 0.003157503)
    Thelen2003Muscle MF_m5t_2_r: max_isometric_force=34.87635 optimal_fiber_length=0.06429938
        tendon_slack_length=0.02603672 pennation_angle_at_optimal=0
      PathPoint MF_m5t_2_r_P1: sacrum (-0.1835541 0.02909655 0.01321241)
      PathPoint MF_m5t_2_r_P2: lumbar5 (-0.03729842 0.0172299 0.002990829)
    Thelen2003Muscle MF_m5t_3_r: max_isometric_force=34.87635 optimal_fiber_length=0.04606857
        tendon_slack_length=0.01867645 pennation_angle_at_optimal=0
      PathPoint MF_m5t_3_r_P1: sacrum (-0.1713559 0.04828419 0.01308681)
      PathPoint MF_m5t_3_r_P2: lumbar5 (-0.03543219 0.01649251 0.002504521)
    Thelen2003Muscle MF_m1_laminar_r: max_isometric_force=39.05418 optimal_fiber_length=0.03574913
        tendon_slack_length=0.01356336 pennation_angle_at_optimal=0
      PathPoint MF_m1_laminar_r_P1: lumbar3 (-0.03730674 0.02315492 0.01678342)
      PathPoint MF_m1_laminar_r_P2: lumbar1 (-0.03354501 -0.005370208 0.007684499)
    Thelen2003Muscle MF_m2_laminar_r: max_isometric_force=30.97457 optimal_fiber_length=0.02854144
        tendon_slack_length=0.01082923 pennation_angle_at_optimal=0
      PathPoint MF_m2_laminar_r_P1: lumbar4 (-0.0341058 0.03516296 0.01750522)
      PathPoint MF_m2_laminar_r_P2: lumbar2 (-0.0349778 -0.005831572 0.00681266)
    Thelen2003Muscle MF_m3_laminar_r: max_isometric_force=35.77736 optimal_fiber_length=0.03331635
        tendon_slack_length=0.01268236 pennation_angle_at_optimal=0
      PathPoint MF_m3_laminar_r_P1: lumbar5 (-0.02374898 0.04218588 0.01726638)
      PathPoint MF_m3_laminar_r_P2: lumbar3 (-0.03544141 0.0006394926 0.005920819)
    Thelen2003Muscle MF_m4_laminar_r: max_isometric_force=25.94666 optimal_fiber_length=0.03805189
        tendon_slack_length=0.01450115 pennation_angle_at_optimal=0
      PathPoint MF_m4_laminar_r_P1: sacrum (-0.1440382 0.08785942 0.02031289)
      PathPoint MF_m4_laminar_r_P2: lumbar4 (-0.03513931 0.006012287 0.007171561)
    Thelen2003Muscle MF_m5_laminar_r: max_isometric_force=55.93696 optimal_fiber_length=0.03031504
        tendon_slack_length=0.01148656 pennation_angle_at_optimal=0
      PathPoint MF_m5_laminar_r_P1: pelvis (-0.1496457 0.0464845 0.01309795)
      PathPoint MF_m5_laminar_r_P2: lumbar5 (-0.03130548 0.0194704 0.006086399)
    Thelen2003Muscle MF_m1s_l: max_isometric_force=81.19739 optimal_fiber_length=0.05011443
        tendon_slack_length=0.02083409 pennation_angle_at_optimal=0
      PathPoint MF_m1s_l_P1: lumbar4 (-0.0341058 0.03309455 -0.01756722)
      PathPoint MF_m1s_l_P2: lumbar1 (-0.03546187 -0.01245488 -0.002881687)
    Thelen2003Muscle MF_m1t_1_l: max_isometric_force=71.96337 optimal_fiber_length=0.0840901
        tendon_slack_length=0.02521744 pennation_angle_at_optimal=0
      PathPoint MF_m1t_1_l_P1: lumbar5 (-0.02011614 0.03998972 -0.01898223)
      PathPoint MF_m1t_1_l_P2: lumbar1 (-0.04217087 -0.01533349 -0.002977744)
    Thelen2003Muscle MF_m1t_2_l: max_isometric_force=59.72683 optimal_fiber_length=0.1061308
        tendon_slack_length=0.03183925 pennation_angle_at_optimal=0
      PathPoint MF_m1t_2_l_P1: sacrum (-0.1366382 0.09521661 -0.02369837)
      PathPoint MF_m1t_2_l_P2: lumbar1 (-0.04217087 -0.01532908 -0.002977744)
    Thelen2003Muscle MF_m1t_3_l: max_isometric_force=99.76112 optimal_fiber_length=0.1266848
        tendon_slack_length=0.03800544 pennation_angle_at_optimal=0
      PathPoint MF_m1t_3_l_P1: pelvis (-0.1431394 0.0557814 -0.05239182)
      PathPoint MF_m1t_3_l_P2: lumbar1 (-0.04217087 -0.01532908 -0.002977744)
    Thelen2003Muscle MF_m2s_l: max_isometric_force=54.47881 optimal_fiber_length=0.05230781
        tendon_slack_length=0.02025739 pennation_angle_at_optimal=0
      PathPoint MF_m2s_l_P1: lumbar5 (-0.02158998 0.04326757 -0.01706134)
      PathPoint MF_m2s_l_P2: lumbar2 (-0.03983583 -0.01166314 -0.003892948)
    Thelen2003Muscle MF_m2t_1_l: max_isometric_force=57.47237 optimal_fiber_length=0.07388226
        tendon_slack_length=0.0224816 pennation_angle_at_optimal=0
      PathPoint MF_m2t_1_l_P1: sacrum (-0.1358888 0.09662428 -0.02482687)
      PathPoint MF_m2t_1_l_P2: lumbar2 (-0.04372225 -0.01787377 -0.003542583)
    Thelen2003Muscle MF_m2t_2_l: max_isometric_force=145.8914 optimal_fiber_length=0.1030649
        tendon_slack_length=0.03133878 pennation_angle_at_optimal=0
      PathPoint MF_m2t_2_l_P1: pelvis (-0.1453082 0.05061645 -0.05130032)
      PathPoint MF_m2t_2_l_P2: lumbar2 (-0.04372225 -0.01787377 -0.003542583)
    Thelen2003Muscle MF_m2t_3_l: max_isometric_force=161.1852 optimal_fiber_length=0.1144879
        tendon_slack_length=0.03487274 pennation_angle_at_optimal=0
      PathPoint MF_m2t_3_l_P1: pelvis (-0.1485613 0.0371876 -0.04911733)
      PathPoint MF_m2t_3_l_P2: lumbar2 (-0.04275065 -0.01821229 -0.003542583)
    Thelen2003Muscle MF_m3s_l: max_isometric_force=83.72206 optimal_fiber_length=0.04999714
        tendon_slack_length=0.0208056 pennation_angle_at_optimal=0
      PathPoint MF_m3s_l_P1: sacrum (-0.1367361 0.09483019 -0.02144139)
      PathPoint MF_m3s_l_P2: lumbar3 (-0.03357607 -0.005557181 -0.002797237)
    Thelen2003Muscle MF_m3t_1_l: max_isometric_force=90.97846 optimal_fiber_length=0.1272006
        tendon_slack_length=0.04228745 pennation_angle_at_optimal=0
      PathPoint MF_m3t_1_l_P1: pelvis (-0.166996 0.002065978 -0.01746394)
      PathPoint MF_m3t_1_l_P2: lumbar3 (-0.04476809 -0.009470548 -0.00271332)
    Thelen2003Muscle MF_m3t_2_l: max_isometric_force=90.97846 optimal_fiber_length=0.1087445
        tendon_slack_length=0.03620996 pennation_angle_at_optimal=0
      PathPoint MF_m3t_2_l_P1: pelvis (-0.1594052 0.02169277 -0.02384919)
      PathPoint MF_m3t_2_l_P2: lumbar3 (-0.04476809 -0.009474994 -0.002480217)
    Thelen2003Muscle MF_m3t_3_l: max_isometric_force=90.97846 optimal_fiber_length=0.1087445
        tendon_slack_length=0.03620996 pennation_angle_at_optimal=0
      PathPoint MF_m3t_3_l_P1: pelvis (-0.1594052 0.02169277 -0.02384919)
      PathPoint MF_m3t_3_l_P2: lumbar3 (-0.04476809 -0.009474994 -0.002480217)
    Thelen2003Muscle MF_m4s_l: max_isometric_force=101.066 optimal_fiber_length=0.04824529
        tendon_slack_length=0.03047663 pennation_angle_at_optimal=0
      PathPoint MF_m4s_l_P1: sacrum (-0.161693 0.06203265 -0.02031289)
      PathPoint MF_m4s_l_P2: lumbar4 (-0.03720633 -0.0002225815 -0.002066732)
    Thelen2003Muscle MF_m4t_1_l: max_isometric_force=90.11722 optimal_fiber_length=0.06926798
        tendon_slack_length=0.02804508 pennation_angle_at_optimal=0
      PathPoint MF_m4t_1_l_P1: sacrum (-0.1710453 0.04762157 -0.01692741)
      PathPoint MF_m4t_1_l_P2: lumbar4 (-0.04444089 0 -0.003100098)
    Thelen2003Muscle MF_m4t_2_l: max_isometric_force=90.11722 optimal_fiber_length=0.09055988
        tendon_slack_length=0.03669821 pennation_angle_at_optimal=0
      PathPoint MF_m4t_2_l_P1: pelvis (-0.1637428 0.008263911 -0.01746394)
      PathPoint MF_m4t_2_l_P2: lumbar4 (-0.0454744 0.0001758148 -0.002976095)
    Thelen2003Muscle MF_m4t_3_l: max_isometric_force=90.11722 optimal_fiber_length=0.1022958
        tendon_slack_length=0.04138687 pennation_angle_at_optimal=0
      PathPoint MF_m4t_3_l_P1: pelvis (-0.1735023 -0.004131955 -0.01528095)
      PathPoint MF_m4t_3_l_P2: lumbar4 (-0.04557775 0.0001758148 -0.003100098)
    Thelen2003Muscle MF_m5s_l: max_isometric_force=34.87635 optimal_fiber_length=0.01625969
        tendon_slack_length=0.01028674 pennation_angle_at_optimal=0
      PathPoint MF_m5s_l_P1: sacrum (-0.1468008 0.07514037 -0.01354193)
      PathPoint MF_m5s_l_P2: lumbar5 (-0.03346447 0.01838872 -0.004316595)
    Thelen2003Muscle MF_m5t_1_l: max_isometric_force=34.87635 optimal_fiber_length=0.08600317
        tendon_slack_length=0.03474075 pennation_angle_at_optimal=0
      PathPoint MF_m5t_1_l_P1: sacrum (-0.1958773 0.005929135 -0.0113188)
      PathPoint MF_m5t_1_l_P2: lumbar5 (-0.03833302 0.01824052 -0.003161906)
    Thelen2003Muscle MF_m5t_2_l: max_isometric_force=34.87635 optimal_fiber_length=0.06430007
        tendon_slack_length=0.026037 pennation_angle_at_optimal=0
      PathPoint MF_m5t_2_l_P1: sacrum (-0.1835541 0.02909655 -0.01321467)
      PathPoint MF_m5t_2_l_P2: lumbar5 (-0.03729842 0.0172299 -0.003161906)
    Thelen2003Muscle MF_m5t_3_l: max_isometric_force=34.87635 optimal_fiber_length=0.04607147
        tendon_slack_length=0.01867762 pennation_angle_at_optimal=0
      PathPoint MF_m5t_3_l_P1: sacrum (-0.1713559 0.04828419 -0.01309053)
      PathPoint MF_m5t_3_l_P2: lumbar5 (-0.03543219 0.01649251 -0.002989242)
    Thelen2003Muscle MF_m1_laminar_l: max_isometric_force=39.05418 optimal_fiber_length=0.0357605
        tendon_slack_length=0.01356767 pennation_angle_at_optimal=0
      PathPoint MF_m1_laminar_l_P1: lumbar3 (-0.03730674 0.02340499 -0.01678342)
      PathPoint MF_m1_laminar_l_P2: lumbar1 (-0.03354501 -0.005370208 -0.007684499)
    Thelen2003Muscle MF_m2_laminar_l: max_isometric_force=30.97457 optimal_fiber_length=0.02859142
        tendon_slack_length=0.01084819 pennation_angle_at_optimal=0
      PathPoint MF_m2_laminar_l_P1: lumbar4 (-0.0341058 0.03464968 -0.01750522)
      PathPoint MF_m2_laminar_l_P2: lumbar2 (-0.0349778 -0.005831572 -0.00681266)
    Thelen2003Muscle MF_m3_laminar_l: max_isometric_force=35.77736 optimal_fiber_length=0.03331774
        tendon_slack_length=0.01268289 pennation_angle_at_optimal=0
      PathPoint MF_m3_laminar_l_P1: lumbar5 (-0.02374898 0.04218588 -0.01744984)
      PathPoint MF_m3_laminar_l_P2: lumbar3 (-0.03544141 0.0009261969 -0.005594474)
    Thelen2003Muscle MF_m4_laminar_l: max_isometric_force=25.94666 optimal_fiber_length=0.03805189
        tendon_slack_length=0.01450115 pennation_angle_at_optimal=0
      PathPoint MF_m4_laminar_l_P1: sacrum (-0.1440382 0.08785942 -0.02031289)
      PathPoint MF_m4_laminar_l_P2: lumbar4 (-0.03513931 0.006012287 -0.007171561)
    Thelen2003Muscle MF_m5_laminar_l: max_isometric_force=55.93696 optimal_fiber_length=0.03030622
        tendon_slack_length=0.01148321 pennation_angle_at_optimal=0
      PathPoint MF_m5_laminar_l_P1: pelvis (-0.1496457 0.0464845 -0.01351272)
      PathPoint MF_m5_laminar_l_P2: lumbar5 (-0.03130548 0.0194704 -0.006086399)
    Thelen2003Muscle IL_L1_r: max_isometric_force=147.4443 optimal_fiber_length=0.05988722
        tendon_slack_length=0.1357444 pennation_angle_at_optimal=0.2408554
      PathPoint IL_L1_r_P1: pelvis (-0.1561445 0.04028667 0.05491547)
      PathPoint IL_L1_r_P2: lumbar1 (-0.0297113 0.01628715 0.02785631)
    Thelen2003Muscle IL_L2_r: max_isometric_force=183.2164 optimal_fiber_length=0.04372776
        tendon_slack_length=0.09922423 pennation_angle_at_optimal=0.2408554
      PathPoint IL_L2_r_P1: pelvis (-0.147477 0.05784738 0.06003229)
      PathPoint IL_L2_r_P2: lumbar2 (-0.0315286 0.01255052 0.03017035)
      PathWrap: wrap_object=Cylinder method=hybrid
    Thelen2003Muscle IL_L3_r: max_isometric_force=216.7631 optimal_fiber_length=0.03061542
        tendon_slack_length=0.06953912 pennation_angle_at_optimal=0.2408554
      PathPoint IL_L3_r_P1: pelvis (-0.1322955 0.07024324 0.06548977)
      PathPoint IL_L3_r_P2: lumbar3 (-0.02955412 0.02031529 0.0290343)
      PathWrap: wrap_object=Cylinder method=hybrid
    Thelen2003Muscle IL_L4_r: max_isometric_force=414.9096 optimal_fiber_length=0.02213108
        tendon_slack_length=0.05017955 pennation_angle_at_optimal=0.2408554
      PathPoint IL_L4_r_P1: pelvis (-0.1268736 0.06714428 0.06112379)
      PathPoint IL_L4_r_P2: lumbar4 (-0.024563 0.02850661 0.03203435)
      PathWrap: wrap_object=Cylinder method=hybrid
    Thelen2003Muscle IL_L1_l: max_isometric_force=147.4443 optimal_fiber_length=0.05988347
        tendon_slack_length=0.1357359 pennation_angle_at_optimal=0.2408554
      PathPoint IL_L1_l_P1: pelvis (-0.1561521 0.04028657 -0.05457481)
      PathPoint IL_L1_l_P2: lumbar1 (-0.0297113 0.01628715 -0.02785631)
    Thelen2003Muscle IL_L2_l: max_isometric_force=183.2164 optimal_fiber_length=0.04372244
        tendon_slack_length=0.09921215 pennation_angle_at_optimal=0.2408554
      PathPoint IL_L2_l_P1: pelvis (-0.147477 0.05784738 -0.06003229)
      PathPoint IL_L2_l_P2: lumbar2 (-0.03109138 0.01263507 -0.03017035)
      PathWrap: wrap_object=Cylinder method=hybrid
    Thelen2003Muscle IL_L3_l: max_isometric_force=216.7631 optimal_fiber_length=0.030606 tendon_slack_length=0.06951772
        pennation_angle_at_optimal=0.2408554
      PathPoint IL_L3_l_P1: pelvis (-0.1322955 0.07024324 -0.06548977)
      PathPoint IL_L3_l_P2: lumbar3 (-0.0298454 0.02037633 -0.02847504)
      PathWrap: wrap_object=Cylinder method=hybrid
    Thelen2003Muscle IL_L4_l: max_isometric_force=414.9096 optimal_fiber_length=0.02212329
        tendon_slack_length=0.05016189 pennation_angle_at_optimal=0.2408554
      PathPoint IL_L4_l_P1: pelvis (-0.1268736 0.06714428 -0.06112379)
      PathPoint IL_L4_l_P2: lumbar4 (-0.02480422 0.02895773 -0.03203435)
      PathWrap: wrap_object=Cylinder method=hybrid
    Thelen2003Muscle IL_R5_r: max_isometric_force=57.32231 optimal_fiber_length=0.2078147 tendon_slack_length=0.2909632
        pennation_angle_at_optimal=0.2408554
      PathPoint IL_r5_R_P1: pelvis (-0.147477 0.04545151 0.05348332)
      PathPoint IL_r5_R_P2: lumbar2 (-0.04822059 0.001943857 0.05450128)
      PathPoint IL_r5_R_P3: torso (-0.100088 0.2021189 0.06110201)
      PathPoint IL_r5_R_P4: torso (-0.101355 0.235022 0.06110201)
      PathPoint IL_r5_R_P5: torso (-0.1026219 0.278501 0.06217398)
      PathPoint IL_r5_R_P6: torso (-0.100088 0.3114041 0.06324594)
      PathPoint IL_r5_R_P7: torso (-0.09628721 0.3372565 0.06324594)
      PathPoint IL_r5_R_P8: torso (-0.08868559 0.3619338 0.06431791)
    Thelen2003Muscle IL_R6_r: max_isometric_force=72.69179 optimal_fiber_length=0.2020401 tendon_slack_length=0.2440517
        pennation_angle_at_optimal=0.2408554
      PathPoint IL_r6_R_P1: pelvis (-0.1398862 0.06094634 0.0578493)
      PathPoint IL_r6_R_P2: lumbar2 (-0.04781689 0.0022997 0.05644775)
      PathPoint IL_r6_R_P3: torso (-0.100088 0.2009438 0.06431791)
      PathPoint IL_r6_R_P4: torso (-0.101355 0.2373722 0.06431791)
      PathPoint IL_r6_R_P5: torso (-0.1026219 0.2820264 0.06538987)
      PathPoint IL_r6_R_P6: torso (-0.09755415 0.3149294 0.06646184)
      PathPoint IL_r6_R_P7: torso (-0.08995252 0.331381 0.0675338)
    Thelen2003Muscle IL_R7_r: max_isometric_force=87.65739 optimal_fiber_length=0.1981072 tendon_slack_length=0.2081537
        pennation_angle_at_optimal=0.2408554
      PathPoint IL_r7_R_P1: pelvis (-0.1290423 0.07127623 0.06330678)
      PathPoint IL_r7_R_P2: lumbar2 (-0.04728309 0.002307232 0.05936746)
      PathPoint IL_r7_R_P3: torso (-0.101355 0.2021189 0.0675338)
      PathPoint IL_r7_R_P4: torso (-0.101355 0.2361971 0.0675338)
      PathPoint IL_r7_R_P5: torso (-0.1026219 0.2808513 0.06860577)
      PathPoint IL_r7_R_P6: torso (-0.09502027 0.3067037 0.06967773)
    Thelen2003Muscle IL_R8_r: max_isometric_force=77.91768 optimal_fiber_length=0.1812834 tendon_slack_length=0.1830816
        pennation_angle_at_optimal=0.2408554
      PathPoint IL_r8_R_P1: pelvis (-0.1312111 0.07334221 0.06548977)
      PathPoint IL_r8_R_P2: lumbar2 (-0.04663707 0.002915786 0.06228718)
      PathPoint IL_r8_R_P3: torso (-0.100088 0.1962433 0.06967773)
      PathPoint IL_r8_R_P4: torso (-0.1027563 0.2361971 0.06967773)
      PathPoint IL_r8_R_P5: torso (-0.100088 0.2691002 0.0707497)
    Thelen2003Muscle IL_R9_r: max_isometric_force=95.91499 optimal_fiber_length=0.2078362 tendon_slack_length=0.1222894
        pennation_angle_at_optimal=0.2408554
      PathPoint IL_r9_R_P1: pelvis (-0.1290423 0.07747416 0.06548977)
      PathPoint IL_r9_R_P2: lumbar2 (-0.04663707 0.002915786 0.06423365)
      PathPoint IL_r9_R_P3: torso (-0.101355 0.1985936 0.07289363)
      PathPoint IL_r9_R_P4: torso (-0.09628721 0.2267962 0.07289363)
    Thelen2003Muscle IL_R10_r: max_isometric_force=191.842 optimal_fiber_length=0.1791558 tendon_slack_length=0.1054441
        pennation_angle_at_optimal=0.2408554
      PathPoint IL_r10_R_P1: pelvis (-0.1268736 0.0743752 0.06767277)
      PathPoint IL_r10_R_P2: lumbar2 (-0.04672286 0.002553101 0.06715336)
      PathPoint IL_r10_R_P3: torso (-0.09502027 0.182142 0.07503756)
    Thelen2003Muscle IL_R11_r: max_isometric_force=235.1806 optimal_fiber_length=0.1479071
        tendon_slack_length=0.07406213 pennation_angle_at_optimal=0.2408554
      PathPoint IL_r11_R_P1: pelvis (-0.122536 0.08160612 0.06985576)
      PathPoint IL_r11_R_P2: lumbar2 (-0.04658567 0.002627483 0.07007307)
      PathPoint IL_r11_R_P3: torso (-0.07855009 0.1468887 0.07932542)
    Thelen2003Muscle IL_R12_r: max_isometric_force=206.1732 optimal_fiber_length=0.1030532
        tendon_slack_length=0.05157775 pennation_angle_at_optimal=0.2408554
      PathPoint IL_r12_R_P1: pelvis (-0.1203672 0.08470509 0.07313025)
      PathPoint IL_r12_R_P2: torso (-0.04054198 0.1116354 0.07182167)
    Thelen2003Muscle IL_R5_l: max_isometric_force=57.32231 optimal_fiber_length=0.2077261 tendon_slack_length=0.2908391
        pennation_angle_at_optimal=0.2408554
      PathPoint IL_r5_L_P1: pelvis (-0.1473772 0.04528406 -0.0534664)
      PathPoint IL_r5_L_P2: lumbar2 (-0.04822059 0.002052072 -0.05450128)
      PathPoint IL_r5_L_P3: torso (-0.09882108 0.2021189 -0.06110201)
      PathPoint IL_r5_L_P4: torso (-0.101355 0.235022 -0.06110201)
      PathPoint IL_r5_L_P5: torso (-0.1026219 0.278501 -0.06217398)
      PathPoint IL_r5_L_P6: torso (-0.100088 0.3114041 -0.06324594)
      PathPoint IL_r5_L_P7: torso (-0.09628721 0.3372565 -0.06324594)
      PathPoint IL_r5_L_P8: torso (-0.08868559 0.3619338 -0.06431791)
    Thelen2003Muscle IL_R6_l: max_isometric_force=72.6918 optimal_fiber_length=0.2019651 tendon_slack_length=0.2439612
        pennation_angle_at_optimal=0.2408554
      PathPoint IL_r6_L_P1: pelvis (-0.1395848 0.06059668 -0.05782234)
      PathPoint IL_r6_L_P2: lumbar2 (-0.04781689 0.001943857 -0.05644775)
      PathPoint IL_r6_L_P3: torso (-0.100088 0.2020014 -0.06431791)
      PathPoint IL_r6_L_P4: torso (-0.100088 0.2373722 -0.06431791)
      PathPoint IL_r6_L_P5: torso (-0.101355 0.2820264 -0.06538987)
      PathPoint IL_r6_L_P6: torso (-0.09755415 0.3149294 -0.06646184)
      PathPoint IL_r6_L_P7: torso (-0.08995252 0.331381 -0.0675338)
    Thelen2003Muscle IL_R7_l: max_isometric_force=87.65739 optimal_fiber_length=0.1981233 tendon_slack_length=0.2081706
        pennation_angle_at_optimal=0.2408554
      PathPoint IL_r7_L_P1: pelvis (-0.1289447 0.0715508 -0.06338875)
      PathPoint IL_r7_L_P2: lumbar2 (-0.04728309 0.002307232 -0.05936746)
      PathPoint IL_r7_L_P3: torso (-0.101355 0.2021189 -0.0675338)
      PathPoint IL_r7_L_P4: torso (-0.101355 0.2361971 -0.0675338)
      PathPoint IL_r7_L_P5: torso (-0.1026219 0.2808513 -0.06860577)
      PathPoint IL_r7_L_P6: torso (-0.09502027 0.3067037 -0.06967773)
    Thelen2003Muscle IL_R8_l: max_isometric_force=77.91768 optimal_fiber_length=0.1812775 tendon_slack_length=0.1830756
        pennation_angle_at_optimal=0.2408554
      PathPoint IL_r8_L_P1: pelvis (-0.1312111 0.07334221 -0.06548977)
      PathPoint IL_r8_L_P2: lumbar2 (-0.04663707 0.00277509 -0.06228718)
      PathPoint IL_r8_L_P3: torso (-0.100088 0.1962433 -0.06967773)
      PathPoint IL_r8_L_P4: torso (-0.1026219 0.2361971 -0.06967773)
      PathPoint IL_r8_L_P5: torso (-0.100088 0.2691002 -0.0707497)
    Thelen2003Muscle IL_R9_l: max_isometric_force=95.915 optimal_fiber_length=0.2076853 tendon_slack_length=0.1222006
        pennation_angle_at_optimal=0.2408554
      PathPoint IL_r9_L_P1: pelvis (-0.1290423 0.07747416 -0.06548977)
      PathPoint IL_r9_L_P2: lumbar2 (-0.04697946 0.002580092 -0.06423365)
      PathPoint IL_r9_L_P3: torso (-0.09882108 0.192718 -0.07289363)
      PathPoint IL_r9_L_P4: torso (-0.09628721 0.2267962 -0.07289363)
    Thelen2003Muscle IL_R10_l: max_isometric_force=191.842 optimal_fiber_length=0.1793293 tendon_slack_length=0.1055462
        pennation_angle_at_optimal=0.2408554
      PathPoint IL_r10_L_P1: pelvis (-0.1257892 0.07850715 -0.06767277)
      PathPoint IL_r10_L_P2: lumbar2 (-0.04672286 0.002553101 -0.06715336)
      PathPoint IL_r10_L_P3: torso (-0.09496643 0.182142 -0.07503756)
    Thelen2003Muscle IL_R11_l: max_isometric_force=235.1806 optimal_fiber_length=0.1480129
        tendon_slack_length=0.07411512 pennation_angle_at_optimal=0.2408554
      PathPoint IL_r11_L_P1: pelvis (-0.122536 0.08160612 -0.06985576)
      PathPoint IL_r11_L_P2: lumbar2 (-0.04658567 0.002627483 -0.07007307)
      PathPoint IL_r11_L_P3: torso (-0.07910716 0.1468887 -0.07932542)
    Thelen2003Muscle IL_R12_l: max_isometric_force=206.1732 optimal_fiber_length=0.1030962
        tendon_slack_length=0.05159929 pennation_angle_at_optimal=0.2408554
      PathPoint IL_r12_L_P1: pelvis (-0.1203672 0.08464796 -0.07265305)
      PathPoint IL_r12_L_P2: torso (-0.04055744 0.1120584 -0.07182167)
    Thelen2003Muscle LTpT_T1_r: max_isometric_force=325.8947 optimal_fiber_length=0.127414 tendon_slack_length=0.30177
        pennation_angle_at_optimal=0.2199115
      PathPoint LTpT_t1_R_P1: lumbar1 (-0.04600459 -0.01245488 0.003083405)
      PathPoint LTpT_t1_R_P2: torso (-0.06334685 0.4759195 0.02803189)
      PathWrap: wrap_object=Chest_r method=hybrid
    Thelen2003Muscle LTpT_T2_r: max_isometric_force=240.6609 optimal_fiber_length=0.1313249
        tendon_slack_length=0.3156805 pennation_angle_at_optimal=0.2199115
      PathPoint LTpT_t2_R_P1: lumbar2 (-0.04566546 -0.01457893 0.003727498)
      PathPoint LTpT_t2_R_P2: torso (-0.06968153 0.4535924 0.02844996)
      PathWrap: wrap_object=Chest_r method=hybrid
    Thelen2003Muscle LTpT_T3_r: max_isometric_force=172.5042 optimal_fiber_length=0.1312732
        tendon_slack_length=0.3157289 pennation_angle_at_optimal=0.2199115
      PathPoint LTpT_t3_R_P1: lumbar3 (-0.04663343 -0.003704787 0.00372965)
      PathPoint LTpT_t3_R_P2: lumbar1 (-0.0355673 -0.01343211 0.004802812)
      PathPoint LTpT_t3_R_P3: torso (-0.07781844 0.4290161 0.02736127)
      PathWrap: wrap_object=Chest_r method=hybrid
    Thelen2003Muscle LTpT_T4_r: max_isometric_force=60.57609 optimal_fiber_length=0.133319
        tendon_slack_length=0.3206708 pennation_angle_at_optimal=0.2199115
      PathPoint LTpT_t4_R_P1: lumbar4 (-0.05064194 0.007239433 0.002914093)
      PathPoint LTpT_t4_R_P2: lumbar1 (-0.03557008 -0.01341295 0.005878642)
      PathPoint LTpT_t4_R_P3: torso (-0.08868559 0.4030627 0.02803189)
      PathWrap: wrap_object=Chest_r method=hybrid
    Thelen2003Muscle LTpT_T5_r: max_isometric_force=57.01232 optimal_fiber_length=0.1211474
        tendon_slack_length=0.2912623 pennation_angle_at_optimal=0.2199115
      PathPoint LTpT_t5_R_P1: lumbar4 (-0.05064194 0.004136819 -0.0004471851)
      PathPoint LTpT_t5_R_P2: lumbar2 (-0.04275065 0.004276486 0.006228718)
      PathPoint LTpT_t5_R_P3: torso (-0.09370101 0.3760351 0.03001502)
      PathWrap: wrap_object=Chest_r method=hybrid
    Thelen2003Muscle LTpT_T6_r: max_isometric_force=81.40657 optimal_fiber_length=0.1265244
        tendon_slack_length=0.2891514 pennation_angle_at_optimal=0.2199115
      PathPoint LTpT_t6_R_P1: lumbar5 (-0.04102097 0.0194704 0.000230463)
      PathPoint LTpT_t6_R_P2: lumbar2 (-0.04275065 0.004276486 0.008759134)
      PathPoint LTpT_t6_R_P3: torso (-0.09244662 0.2233155 0.01635036)
      PathPoint LTpT_t6_R_P4: torso (-0.101355 0.3454823 0.02965056)
    Thelen2003Muscle LTpT_T7_r: max_isometric_force=79.70635 optimal_fiber_length=0.1430669
        tendon_slack_length=0.2706642 pennation_angle_at_optimal=0.2199115
      PathPoint LTpT_t7_R_P1: sacrum (-0.1477708 0.06861214 0.0003124349)
      PathPoint LTpT_t7_R_P2: lumbar2 (-0.04274093 0.004276486 0.01070561)
      PathPoint LTpT_t7_R_P3: torso (-0.09205919 0.2240711 0.02084758)
      PathPoint LTpT_t7_R_P4: torso (-0.101355 0.3137543 0.02837492)
    Thelen2003Muscle LTpT_T8_r: max_isometric_force=79.70635 optimal_fiber_length=0.1523092
        tendon_slack_length=0.2405631 pennation_angle_at_optimal=0.2199115
      PathPoint LTpT_t8_R_P1: sacrum (-0.1608062 0.05697082 0.0004226323)
      PathPoint LTpT_t8_R_P2: lumbar4 (-0.04854795 0.0186615 0.005846114)
      PathPoint LTpT_t8_R_P3: lumbar3 (-0.04360207 0.01254617 0.007754277)
      PathPoint LTpT_t8_R_P4: lumbar2 (-0.04402918 0.003014447 0.01064721)
      PathPoint LTpT_t8_R_P5: torso (-0.100088 0.2832015 0.02733511)
    Thelen2003Muscle LTpT_T9_r: max_isometric_force=139.4342 optimal_fiber_length=0.1499604
        tendon_slack_length=0.2540996 pennation_angle_at_optimal=0.2199115
      PathPoint LTpT_t9_R_P1: sacrum (-0.1865992 0.03042701 0)
      PathPoint LTpT_t9_R_P2: lumbar4 (-0.04828554 0.01857432 0.007729579)
      PathPoint LTpT_t9_R_P3: lumbar3 (-0.04330334 0.01283098 0.009035057)
      PathPoint LTpT_t9_R_P4: lumbar2 (-0.04344661 0.003375547 0.01119223)
      PathPoint LTpT_t9_R_P5: torso (-0.09502027 0.2608744 0.02588807)
    Thelen2003Muscle LTpT_T10_r: max_isometric_force=120.5072 optimal_fiber_length=0.1367516
        tendon_slack_length=0.2318358 pennation_angle_at_optimal=0.2199115
      PathPoint LTpT_t10_R_P1: sacrum (-0.1850699 0.02784853 0.01209746)
      PathPoint LTpT_t10_R_P2: lumbar4 (-0.04828554 0.01857432 0.01297908)
      PathPoint LTpT_t10_R_P3: lumbar3 (-0.04299602 0.01299454 0.01343606)
      PathPoint LTpT_t10_R_P4: lumbar2 (-0.04275065 0.003285119 0.01484187)
      PathPoint LTpT_t10_R_P5: torso (-0.08615171 0.2267962 0.01940257)
    Thelen2003Muscle LTpT_T11_r: max_isometric_force=115.0784 optimal_fiber_length=0.1169145
        tendon_slack_length=0.1980694 pennation_angle_at_optimal=0.2199115
      PathPoint LTpT_t11_R_P1: sacrum (-0.1774021 0.03481976 0.027129)
      PathPoint LTpT_t11_R_P2: lumbar4 (-0.04828554 0.01758148 0.02267205)
      PathPoint LTpT_t11_R_P3: lumbar3 (-0.04677165 0.01249328 0.01947343)
      PathPoint LTpT_t11_R_P4: lumbar2 (-0.04469386 0.003285119 0.01929929)
      PathPoint LTpT_t11_R_P5: torso (-0.07474928 0.1900364 0.01888803)
    Thelen2003Muscle LTpT_T12_r: max_isometric_force=94.29293 optimal_fiber_length=0.09027578
        tendon_slack_length=0.1529353 pennation_angle_at_optimal=0.2199115
      PathPoint LTpT_t12_R_P1: sacrum (-0.1628982 0.05533173 0.03151884)
      PathPoint LTpT_t12_R_P2: lumbar4 (-0.04828554 0.01758148 0.02608216)
      PathPoint LTpT_t12_R_P3: lumbar3 (-0.04604342 0.01301899 0.02228223)
      PathPoint LTpT_t12_R_P4: lumbar2 (-0.04450226 0.003871513 0.02195068)
      PathPoint LTpT_t12_R_P5: torso (-0.06461378 0.1562896 0.01913876)
    Thelen2003Muscle LTpT_R4_r: max_isometric_force=60.49967 optimal_fiber_length=0.1687511
        tendon_slack_length=0.2859734 pennation_angle_at_optimal=0.2199115
      PathPoint LTpT_r4_R_P1: lumbar4 (-0.05167545 0.00730134 0.002914227)
      PathPoint LTpT_r4_R_P2: lumbar2 (-0.04858028 0.005303057 0.01117072)
      PathPoint LTpT_r4_R_P3: torso (-0.0924864 0.2232709 0.02786616)
      PathPoint LTpT_r4_R_P4: torso (-0.09375333 0.2526486 0.03064191)
      PathPoint LTpT_r4_R_P5: torso (-0.09375333 0.2855517 0.0333602)
      PathPoint LTpT_r4_R_P6: torso (-0.0924864 0.320805 0.03593174)
      PathPoint LTpT_r4_R_P7: torso (-0.0823509 0.4018876 0.04115596)
    Thelen2003Muscle LTpT_R5_r: max_isometric_force=56.96222 optimal_fiber_length=0.1580254
        tendon_slack_length=0.2679319 pennation_angle_at_optimal=0.2199115
      PathPoint LTpT_r5_R_P1: lumbar4 (-0.05064194 0.004136819 8.266929e-5)
      PathPoint LTpT_r5_R_P2: lumbar2 (-0.04760867 0.004502635 0.01381627)
      PathPoint LTpT_r5_R_P3: torso (-0.09628721 0.2209206 0.03205905)
      PathPoint LTpT_r5_R_P4: torso (-0.09502027 0.2514735 0.0342688)
      PathPoint LTpT_r5_R_P5: torso (-0.09628721 0.2855517 0.0371377)
      PathPoint LTpT_r5_R_P6: torso (-0.09375333 0.3184548 0.03966271)
      PathPoint LTpT_r5_R_P7: torso (-0.0823509 0.3678094 0.04201374)
    Thelen2003Muscle LTpT_R6_r: max_isometric_force=81.40657 optimal_fiber_length=0.1689314
        tendon_slack_length=0.2587627 pennation_angle_at_optimal=0.2199115
      PathPoint LTpT_r6_R_P1: lumbar5 (-0.04102097 0.02163378 0.0002266213)
      PathPoint LTpT_r6_R_P2: lumbar3 (-0.04663343 0.01364621 0.01011108)
      PathPoint LTpT_r6_R_P3: lumbar2 (-0.04469386 0.004276486 0.01362532)
      PathPoint LTpT_r6_R_P4: torso (-0.09628721 0.2197455 0.03323875)
      PathPoint LTpT_r6_R_P5: torso (-0.09628721 0.2502984 0.03715517)
      PathPoint LTpT_r6_R_P6: torso (-0.09755415 0.2843766 0.04003436)
      PathPoint LTpT_r6_R_P7: torso (-0.0924864 0.3184548 0.04287861)
      PathPoint LTpT_r6_R_P8: torso (-0.08741865 0.3407819 0.04287861)
    Thelen2003Muscle LTpT_R7_r: max_isometric_force=79.70635 optimal_fiber_length=0.1599059
        tendon_slack_length=0.2673926 pennation_angle_at_optimal=0.2199115
      PathPoint LTpT_r7_R_P1: sacrum (-0.1477742 0.06860908 0.0003159783)
      PathPoint LTpT_r7_R_P2: lumbar4 (-0.04828575 0.01947345 0.008400822)
      PathPoint LTpT_r7_R_P3: lumbar3 (-0.04299649 0.01312365 0.01198644)
      PathPoint LTpT_r7_R_P4: lumbar2 (-0.04274093 0.004194183 0.01681014)
      PathPoint LTpT_r7_R_P5: torso (-0.09882108 0.2173953 0.03804436)
      PathPoint LTpT_r7_R_P6: torso (-0.100088 0.2479482 0.0424376)
      PathPoint LTpT_r7_R_P7: torso (-0.09755415 0.2855517 0.04528924)
      PathPoint LTpT_r7_R_P8: torso (-0.09375333 0.3161045 0.04645114)
    Thelen2003Muscle LTpT_R8_r: max_isometric_force=130.0205 optimal_fiber_length=0.133005
        tendon_slack_length=0.2712907 pennation_angle_at_optimal=0.2199115
      PathPoint LTpT_r8_R_P1: sacrum (-0.1608051 0.05697581 0.0004175428)
      PathPoint LTpT_r8_R_P2: lumbar4 (-0.04808793 0.01874351 0.01177355)
      PathPoint LTpT_r8_R_P3: lumbar3 (-0.04283262 0.01296676 0.01495543)
      PathPoint LTpT_r8_R_P4: lumbar2 (-0.04274093 0.003771083 0.01999165)
      PathPoint LTpT_r8_R_P5: torso (-0.100088 0.2173953 0.04364281)
      PathPoint LTpT_r8_R_P6: torso (-0.100088 0.245598 0.04686267)
      PathPoint LTpT_r8_R_P7: torso (-0.09628721 0.2796761 0.04968955)
    Thelen2003Muscle LTpT_R9_r: max_isometric_force=110.6761 optimal_fiber_length=0.1164583
        tendon_slack_length=0.2845051 pennation_angle_at_optimal=0.2199115
      PathPoint LTpT_r9_R_P1: sacrum (-0.1865969 0.03043245 0)
      PathPoint LTpT_r9_R_P2: lumbar4 (-0.04828575 0.01828619 0.01538693)
      PathPoint LTpT_r9_R_P3: lumbar3 (-0.04299649 0.01206232 0.01825859)
      PathPoint LTpT_r9_R_P4: lumbar2 (-0.04274142 0.003826201 0.02354105)
      PathPoint LTpT_r9_R_P5: torso (-0.100088 0.2150451 0.04647934)
      PathPoint LTpT_r9_R_P6: torso (-0.09755415 0.2385473 0.05012498)
    Thelen2003Muscle LTpT_R10_r: max_isometric_force=120.4203 optimal_fiber_length=0.13719
        tendon_slack_length=0.2357749 pennation_angle_at_optimal=0.2199115
      PathPoint LTpT_r10_R_P1: sacrum (-0.1850665 0.02784728 0.01209746)
      PathPoint LTpT_r10_R_P2: lumbar4 (-0.04822911 0.01744093 0.02008771)
      PathPoint LTpT_r10_R_P3: lumbar3 (-0.0429451 0.01173862 0.0218688)
      PathPoint LTpT_r10_R_P4: lumbar2 (-0.04268807 0.00354407 0.02660149)
      PathPoint LTpT_r10_R_P5: torso (-0.09755415 0.2068193 0.05026091)
    Thelen2003Muscle LTpT_R11_r: max_isometric_force=115.3854 optimal_fiber_length=0.1265298
        tendon_slack_length=0.1802189 pennation_angle_at_optimal=0.2199115
      PathPoint LTpT_r11_R_P1: sacrum (-0.1774033 0.03482044 0.027129)
      PathPoint LTpT_r11_R_P2: lumbar4 (-0.04764477 0.01857432 0.03040039)
      PathPoint LTpT_r11_R_P3: lumbar3 (-0.04299602 0.01290544 0.03037548)
      PathPoint LTpT_r11_R_P4: lumbar2 (-0.04277377 0.004354241 0.03462135)
      PathPoint LTpT_r11_R_P5: torso (-0.08237827 0.173512 0.04883337)
    Thelen2003Muscle LTpT_R12_r: max_isometric_force=94.32635 optimal_fiber_length=0.07653827
        tendon_slack_length=0.1488129 pennation_angle_at_optimal=0.2199115
      PathPoint LTpT_r12_R_P1: sacrum (-0.1628982 0.05533173 0.03151884)
      PathPoint LTpT_r12_R_P2: lumbar4 (-0.04828554 0.0181778 0.03462521)
      PathPoint LTpT_r12_R_P3: lumbar3 (-0.04299602 0.01263694 0.03344899)
      PathPoint LTpT_r12_R_P4: lumbar2 (-0.04275065 0.004276486 0.03777649)
      PathPoint LTpT_r12_R_P5: torso (-0.05705663 0.1410132 0.04996944)
    Thelen2003Muscle LTpT_T1_l: max_isometric_force=325.8947 optimal_fiber_length=0.127414 tendon_slack_length=0.30177
        pennation_angle_at_optimal=0.2199115
      PathPoint LTpT_t1_L_P1: lumbar1 (-0.04600459 -0.01245488 -0.003083405)
      PathPoint LTpT_t1_L_P2: torso (-0.06334685 0.4759195 -0.02803189)
      PathWrap: wrap_object=Chest_l method=hybrid
    Thelen2003Muscle LTpT_T2_l: max_isometric_force=240.6609 optimal_fiber_length=0.1313861
        tendon_slack_length=0.3158275 pennation_angle_at_optimal=0.2199115
      PathPoint LTpT_t2_L_P1: lumbar2 (-0.04566546 -0.013607 -0.003892948)
      PathPoint LTpT_t2_L_P2: torso (-0.06968153 0.4535924 -0.02844996)
      PathWrap: wrap_object=Chest_l method=hybrid
    Thelen2003Muscle LTpT_T3_l: max_isometric_force=172.5042 optimal_fiber_length=0.1312576
        tendon_slack_length=0.3156914 pennation_angle_at_optimal=0.2199115
      PathPoint LTpT_t3_L_P1: lumbar3 (-0.04570076 -0.003704787 -0.003794918)
      PathPoint LTpT_t3_L_P2: lumbar1 (-0.0355673 -0.01343211 -0.004802812)
      PathPoint LTpT_t3_L_P3: torso (-0.07728315 0.4289151 -0.02784965)
      PathWrap: wrap_object=Chest_l method=hybrid
    Thelen2003Muscle LTpT_T4_l: max_isometric_force=60.57609 optimal_fiber_length=0.1333202
        tendon_slack_length=0.3206737 pennation_angle_at_optimal=0.2199115
      PathPoint LTpT_t4_L_P1: lumbar4 (-0.05064194 0.00730134 -0.002914093)
      PathPoint LTpT_t4_L_P2: lumbar1 (-0.03557008 -0.01343661 -0.005878642)
      PathPoint LTpT_t4_L_P3: torso (-0.08868559 0.4030627 -0.02803189)
      PathWrap: wrap_object=Chest_l method=hybrid
    Thelen2003Muscle LTpT_T5_l: max_isometric_force=57.01232 optimal_fiber_length=0.1211192
        tendon_slack_length=0.2911944 pennation_angle_at_optimal=0.2199115
      PathPoint LTpT_t5_L_P1: lumbar4 (-0.04888508 0.004105431 -8.266929e-5)
      PathPoint LTpT_t5_L_P2: lumbar2 (-0.04275065 0.004276486 -0.006228718)
      PathPoint LTpT_t5_L_P3: torso (-0.09375333 0.3760351 -0.03010078)
      PathWrap: wrap_object=Chest_l method=hybrid
    Thelen2003Muscle LTpT_T6_l: max_isometric_force=81.40657 optimal_fiber_length=0.1265277
        tendon_slack_length=0.2891588 pennation_angle_at_optimal=0.2199115
      PathPoint LTpT_t6_L_P1: lumbar5 (-0.04102097 0.0194704 -0.0002266213)
      PathPoint LTpT_t6_L_P2: lumbar2 (-0.04275065 0.004276486 -0.008759134)
      PathPoint LTpT_t6_L_P3: torso (-0.0924864 0.2232709 -0.0165833)
      PathPoint LTpT_t6_L_P4: torso (-0.101355 0.3454823 -0.02965056)
    Thelen2003Muscle LTpT_T7_l: max_isometric_force=79.70635 optimal_fiber_length=0.1430787
        tendon_slack_length=0.2706865 pennation_angle_at_optimal=0.2199115
      PathPoint LTpT_t7_L_P1: sacrum (-0.1477708 0.06861214 -0.0003159783)
      PathPoint LTpT_t7_L_P2: lumbar2 (-0.04274093 0.004276486 -0.01070561)
      PathPoint LTpT_t7_L_P3: torso (-0.0924864 0.224446 -0.02036734)
      PathPoint LTpT_t7_L_P4: torso (-0.101355 0.3137543 -0.02787109)
    Thelen2003Muscle LTpT_T8_l: max_isometric_force=120.4665 optimal_fiber_length=0.1523091
        tendon_slack_length=0.240563 pennation_angle_at_optimal=0.2199115
      PathPoint LTpT_t8_L_P1: sacrum (-0.1608062 0.05697082 -0.0004175428)
      PathPoint LTpT_t8_L_P2: lumbar4 (-0.04854795 0.0186615 -0.005848852)
      PathPoint LTpT_t8_L_P3: lumbar3 (-0.04360207 0.01254617 -0.007757671)
      PathPoint LTpT_t8_L_P4: lumbar2 (-0.04402918 0.003014447 -0.01064721)
      PathPoint LTpT_t8_L_P5: torso (-0.100088 0.2832015 -0.02733511)
    Thelen2003Muscle LTpT_T9_l: max_isometric_force=139.4342 optimal_fiber_length=0.1499633
        tendon_slack_length=0.2541045 pennation_angle_at_optimal=0.2199115
      PathPoint LTpT_t9_L_P1: sacrum (-0.1865992 0.03042701 0)
      PathPoint LTpT_t9_L_P2: lumbar4 (-0.04828554 0.01857432 -0.007729579)
      PathPoint LTpT_t9_L_P3: lumbar3 (-0.04330334 0.01283098 -0.009035076)
      PathPoint LTpT_t9_L_P4: lumbar2 (-0.04344661 0.003375547 -0.01167885)
      PathPoint LTpT_t9_L_P5: torso (-0.09502027 0.2608744 -0.02572716)
    Thelen2003Muscle LTpT_T10_l: max_isometric_force=120.5072 optimal_fiber_length=0.1367512
        tendon_slack_length=0.2318351 pennation_angle_at_optimal=0.2199115
      PathPoint LTpT_t10_L_P1: sacrum (-0.1850699 0.02784853 -0.01209746)
      PathPoint LTpT_t10_L_P2: lumbar4 (-0.04828554 0.01857432 -0.01297908)
      PathPoint LTpT_t10_L_P3: lumbar3 (-0.04299602 0.01299454 -0.01343606)
      PathPoint LTpT_t10_L_P4: lumbar2 (-0.04275065 0.003285119 -0.01484187)
      PathPoint LTpT_t10_L_P5: torso (-0.08615171 0.2267962 -0.01929537)
    Thelen2003Muscle LTpT_T11_l: max_isometric_force=115.0784 optimal_fiber_length=0.1170536
        tendon_slack_length=0.198305 pennation_angle_at_optimal=0.2199115
      PathPoint LTpT_t11_L_P1: sacrum (-0.1774021 0.03481976 -0.027129)
      PathPoint LTpT_t11_L_P2: lumbar4 (-0.04828554 0.01758148 -0.02267205)
      PathPoint LTpT_t11_L_P3: lumbar3 (-0.04677165 0.01249328 -0.01946877)
      PathPoint LTpT_t11_L_P4: lumbar2 (-0.04469386 0.003285119 -0.01929929)
      PathPoint LTpT_t11_L_P5: torso (-0.07712985 0.1900364 -0.01888803)
    Thelen2003Muscle LTpT_T12_l: max_isometric_force=94.29293 optimal_fiber_length=0.09026998
        tendon_slack_length=0.1529255 pennation_angle_at_optimal=0.2199115
      PathPoint LTpT_t12_L_P1: sacrum (-0.1628982 0.05533173 -0.03159783)
      PathPoint LTpT_t12_L_P2: lumbar4 (-0.04828554 0.01758148 -0.02583415)
      PathPoint LTpT_t12_L_P3: lumbar3 (-0.04604342 0.01301899 -0.0223779)
      PathPoint LTpT_t12_L_P4: lumbar2 (-0.04450226 0.003871513 -0.02238445)
      PathPoint LTpT_t12_L_P5: torso (-0.06461378 0.1562896 -0.01929537)
    Thelen2003Muscle LTpT_R4_l: max_isometric_force=60.49968 optimal_fiber_length=0.1687439
        tendon_slack_length=0.2859613 pennation_angle_at_optimal=0.2199115
      PathPoint LTpT_r4_L_P1: lumbar4 (-0.05167545 0.007239433 -0.002914093)
      PathPoint LTpT_r4_L_P2: lumbar2 (-0.04858028 0.004859644 -0.01117276)
      PathPoint LTpT_r4_L_P3: torso (-0.0924864 0.2232709 -0.02787109)
      PathPoint LTpT_r4_L_P4: torso (-0.09375333 0.2526486 -0.03063676)
      PathPoint LTpT_r4_L_P5: torso (-0.09375333 0.2855517 -0.03335956)
      PathPoint LTpT_r4_L_P6: torso (-0.0924864 0.320805 -0.03593227)
      PathPoint LTpT_r4_L_P7: torso (-0.0823509 0.4018876 -0.04115274)
    Thelen2003Muscle LTpT_R5_l: max_isometric_force=56.96222 optimal_fiber_length=0.1581471
        tendon_slack_length=0.2681383 pennation_angle_at_optimal=0.2199115
      PathPoint LTpT_r5_L_P1: lumbar4 (-0.05064194 0.004105431 -8.266929e-5)
      PathPoint LTpT_r5_L_P2: lumbar2 (-0.04760867 0.013607 -0.01381997)
      PathPoint LTpT_r5_L_P3: torso (-0.09628721 0.2209206 -0.03206248)
      PathPoint LTpT_r5_L_P4: torso (-0.09502027 0.2502984 -0.03427073)
      PathPoint LTpT_r5_L_P5: torso (-0.09628721 0.2855517 -0.03713287)
      PathPoint LTpT_r5_L_P6: torso (-0.09375333 0.3184548 -0.03914817)
      PathPoint LTpT_r5_L_P7: torso (-0.0823509 0.3678094 -0.04201031)
    Thelen2003Muscle LTpT_R6_l: max_isometric_force=81.40657 optimal_fiber_length=0.1689333
        tendon_slack_length=0.2587656 pennation_angle_at_optimal=0.2199115
      PathPoint LTpT_r6_L_P1: lumbar5 (-0.04102097 0.02163378 -0.0002266213)
      PathPoint LTpT_r6_L_P2: lumbar3 (-0.04663343 0.01364621 -0.01010735)
      PathPoint LTpT_r6_L_P3: lumbar2 (-0.04469386 0.004276486 -0.01362532)
      PathPoint LTpT_r6_L_P4: torso (-0.09628721 0.2197455 -0.03323092)
      PathPoint LTpT_r6_L_P5: torso (-0.09628721 0.2502984 -0.03715431)
      PathPoint LTpT_r6_L_P6: torso (-0.09755415 0.2843766 -0.0400379)
      PathPoint LTpT_r6_L_P7: torso (-0.0924864 0.3184548 -0.04236406)
      PathPoint LTpT_r6_L_P8: torso (-0.08741865 0.3407819 -0.0429858)
    Thelen2003Muscle LTpT_R7_l: max_isometric_force=79.70635 optimal_fiber_length=0.1598961
        tendon_slack_length=0.2673764 pennation_angle_at_optimal=0.2199115
      PathPoint LTpT_r7_L_P1: sacrum (-0.1477742 0.06916466 -0.0003159783)
      PathPoint LTpT_r7_L_P2: lumbar4 (-0.04828575 0.01964989 -0.008266929)
      PathPoint LTpT_r7_L_P3: lumbar3 (-0.04299649 0.01296676 -0.01199082)
      PathPoint LTpT_r7_L_P4: lumbar2 (-0.04274093 0.003887715 -0.0168078)
      PathPoint LTpT_r7_L_P5: torso (-0.09882108 0.2173953 -0.03804404)
      PathPoint LTpT_r7_L_P6: torso (-0.100088 0.2479482 -0.0424391)
      PathPoint LTpT_r7_L_P7: torso (-0.09755415 0.2855517 -0.04529053)
      PathPoint LTpT_r7_L_P8: torso (-0.09375333 0.3161045 -0.04644825)
    Thelen2003Muscle LTpT_R8_l: max_isometric_force=130.0205 optimal_fiber_length=0.1330044
        tendon_slack_length=0.2712894 pennation_angle_at_optimal=0.2199115
      PathPoint LTpT_r8_L_P1: sacrum (-0.1608051 0.05697581 -0.0004175428)
      PathPoint LTpT_r8_L_P2: lumbar4 (-0.04808793 0.01874351 -0.01177004)
      PathPoint LTpT_r8_L_P3: lumbar3 (-0.04283262 0.01250801 -0.01495589)
      PathPoint LTpT_r8_L_P4: lumbar2 (-0.04274093 0.003771083 -0.01999029)
      PathPoint LTpT_r8_L_P5: torso (-0.100088 0.2173953 -0.0436397)
      PathPoint LTpT_r8_L_P6: torso (-0.100088 0.245598 -0.04686632)
      PathPoint LTpT_r8_L_P7: torso (-0.09628721 0.2796761 -0.04968558)
    Thelen2003Muscle LTpT_R9_l: max_isometric_force=110.6761 optimal_fiber_length=0.1164567
        tendon_slack_length=0.2845012 pennation_angle_at_optimal=0.2199115
      PathPoint LTpT_r9_L_P1: sacrum (-0.1865969 0.03043245 0)
      PathPoint LTpT_r9_L_P2: lumbar4 (-0.04828575 0.01828619 -0.01538682)
      PathPoint LTpT_r9_L_P3: lumbar3 (-0.04299649 0.01206232 -0.01825663)
      PathPoint LTpT_r9_L_P4: lumbar2 (-0.04274142 0.003826201 -0.02354261)
      PathPoint LTpT_r9_L_P5: torso (-0.100088 0.2150451 -0.04648041)
      PathPoint LTpT_r9_L_P6: torso (-0.09755415 0.2385473 -0.05038236)
    Thelen2003Muscle LTpT_R10_l: max_isometric_force=120.4203 optimal_fiber_length=0.1371907
        tendon_slack_length=0.235776 pennation_angle_at_optimal=0.2199115
      PathPoint LTpT_r10_L_P1: sacrum (-0.1850665 0.02784728 -0.01209746)
      PathPoint LTpT_r10_L_P2: lumbar4 (-0.04822911 0.01744093 -0.02008864)
      PathPoint LTpT_r10_L_P3: lumbar3 (-0.0429451 0.01173862 -0.02186507)
      PathPoint LTpT_r10_L_P4: lumbar2 (-0.04268807 0.00354407 -0.02659857)
      PathPoint LTpT_r10_L_P5: torso (-0.09755415 0.2068193 -0.05038236)
    Thelen2003Muscle LTpT_R11_l: max_isometric_force=115.3853 optimal_fiber_length=0.1265297
        tendon_slack_length=0.1802187 pennation_angle_at_optimal=0.2199115
      PathPoint LTpT_r11_L_P1: sacrum (-0.1774033 0.03482044 -0.027129)
      PathPoint LTpT_r11_L_P2: lumbar4 (-0.04764477 0.01857432 -0.03040163)
      PathPoint LTpT_r11_L_P3: lumbar3 (-0.04299602 0.01290544 -0.030378)
      PathPoint LTpT_r11_L_P4: lumbar2 (-0.04277377 0.004354241 -0.03461804)
      PathPoint LTpT_r11_L_P5: torso (-0.08237827 0.173512 -0.04883873)
    Thelen2003Muscle LTpT_R12_l: max_isometric_force=94.32651 optimal_fiber_length=0.07657597
        tendon_slack_length=0.1488862 pennation_angle_at_optimal=0.2199115
      PathPoint LTpT_r12_L_P1: sacrum (-0.1628982 0.0555585 -0.03159783)
      PathPoint LTpT_r12_L_P2: lumbar4 (-0.04857492 0.01861568 -0.03513445)
      PathPoint LTpT_r12_L_P3: lumbar3 (-0.04299602 0.01263694 -0.03344563)
      PathPoint LTpT_r12_L_P4: lumbar2 (-0.04275065 0.004276486 -0.03778106)
      PathPoint LTpT_r12_L_P5: torso (-0.05705663 0.1410132 -0.05038236)
    Thelen2003Muscle LTpL_L5_r: max_isometric_force=157.7955 optimal_fiber_length=0.05798488
        tendon_slack_length=0.00112592 pennation_angle_at_optimal=0.2199115
      PathPoint LTpL_L5_L_P1: sacrum (-0.1558887 0.07157805 0.05135878)
      PathPoint LTpL_L5_L_P2: lumbar5 (-0.01419865 0.03086492 0.02788769)
    Thelen2003Muscle LTpL_L4_r: max_isometric_force=151.8409 optimal_fiber_length=0.04944451
        tendon_slack_length=0.05329145 pennation_angle_at_optimal=0.2199115
      PathPoint LTpL_L4_L_P1: pelvis (-0.1442238 0.04235254 0.05239182)
      PathPoint LTpL_L4_L_P2: lumbar4 (-0.02377071 0.02796283 0.02631601)
    Thelen2003Muscle LTpL_L3_r: max_isometric_force=121.2841 optimal_fiber_length=0.06524822
        tendon_slack_length=0.07086927 pennation_angle_at_optimal=0.2199115
      PathPoint LTpL_L3_L_P1: pelvis (-0.1518145 0.04235254 0.05566631)
      PathPoint LTpL_L3_L_P2: lumbar3 (-0.0277661 0.02126909 0.02163365)
    Thelen2003Muscle LTpL_L2_r: max_isometric_force=108.3816 optimal_fiber_length=0.08108008
        tendon_slack_length=0.08922022 pennation_angle_at_optimal=0.2199115
      PathPoint LTpL_L2_L_P1: pelvis (-0.1539833 0.03822059 0.0578493)
      PathPoint LTpL_L2_L_P2: lumbar2 (-0.02911824 0.01395223 0.02146932)
    Thelen2003Muscle LTpL_L1_r: max_isometric_force=106.1599 optimal_fiber_length=0.09502068
        tendon_slack_length=0.1106823 pennation_angle_at_optimal=0.2199115
      PathPoint LTpL_L1_L_P1: pelvis (-0.1562833 0.03464562 0.05847571)
      PathPoint LTpL_L1_L_P2: lumbar1 (-0.03030629 0.01595844 0.02192253)
    Thelen2003Muscle LTpL_L5_l: max_isometric_force=157.7955 optimal_fiber_length=0.05797194
        tendon_slack_length=0.001125669 pennation_angle_at_optimal=0.2199115
      PathPoint LTpL_L5_l_P1: sacrum (-0.1564165 0.07143235 -0.05191073)
      PathPoint LTpL_L5_l_P2: lumbar5 (-0.01403349 0.03136899 -0.02805787)
    Thelen2003Muscle LTpL_L4_l: max_isometric_force=151.8409 optimal_fiber_length=0.04944065
        tendon_slack_length=0.05328729 pennation_angle_at_optimal=0.2199115
      PathPoint LTpL_L4_l_P1: pelvis (-0.1442238 0.04235254 -0.05239182)
      PathPoint LTpL_L4_l_P2: lumbar4 (-0.02377071 0.02792353 -0.02583415)
    Thelen2003Muscle LTpL_L3_l: max_isometric_force=121.2841 optimal_fiber_length=0.06524924
        tendon_slack_length=0.07087037 pennation_angle_at_optimal=0.2199115
      PathPoint LTpL_L3_l_P1: pelvis (-0.1518145 0.04235254 -0.05566631)
      PathPoint LTpL_L3_l_P2: lumbar3 (-0.02798006 0.02130253 -0.02144549)
    Thelen2003Muscle LTpL_L2_l: max_isometric_force=108.3816 optimal_fiber_length=0.08110001
        tendon_slack_length=0.08924215 pennation_angle_at_optimal=0.2199115
      PathPoint LTpL_L2_l_P1: pelvis (-0.1539833 0.03822059 -0.0578493)
      PathPoint LTpL_L2_l_P2: lumbar2 (-0.02914817 0.013607 -0.02141122)
    Thelen2003Muscle LTpL_L1_l: max_isometric_force=106.1599 optimal_fiber_length=0.09501324
        tendon_slack_length=0.1106736 pennation_angle_at_optimal=0.2199115
      PathPoint LTpL_L1_l_P1: pelvis (-0.1561521 0.03512162 -0.0589408)
      PathPoint LTpL_L1_l_P2: lumbar1 (-0.03066973 0.01628715 -0.02209294)
    Millard2012EquilibriumMuscle [values shared by the 52 below unless stated]: pennation_angle_at_optimal=0 [radians]
        minimum_activation=0.01
      ActiveForceLengthCurve: minimum_value=0
      ForceVelocityCurve: concentric_slope_at_vmax=0 concentric_slope_near_vmax=0.25 isometric_slope=5
          eccentric_slope_at_vmax=0 eccentric_slope_near_vmax=0.15 max_eccentric_velocity_force_multiplier=1.4
      FiberForceLengthCurve
      TendonForceLengthCurve
    Millard2012EquilibriumMuscle EO1_r: max_isometric_force=111.744 optimal_fiber_length=0.03922738
        tendon_slack_length=0.06230362
      PathPoint EO1_r_P1: Abdomen (0.006140654 0.04911942 0.02148933)
      PathPoint EO1_r_P2: torso (0.1178251 0.2044691 0.09969276)
    Millard2012EquilibriumMuscle EO2_r: max_isometric_force=132.3546 optimal_fiber_length=0.04009206
        tendon_slack_length=0.05831439
      PathPoint EO2_r_P1: torso (0.1152913 0.1656905 0.1125563)
      PathPoint EO2_r_P2: Abdomen (0.008187538 0.02353639 0.03376894)
    Millard2012EquilibriumMuscle EO3_r: max_isometric_force=138.8978 optimal_fiber_length=0.03847214
        tendon_slack_length=0.04666107
      PathPoint EO3_r_P1: torso (0.09946405 0.118122 0.1217613)
      PathPoint EO3_r_P2: Abdomen (0.006930147 -0.00818657 0.03376894)
    Millard2012EquilibriumMuscle EO4_r: max_isometric_force=134.0928 optimal_fiber_length=0.038272
        tendon_slack_length=0.04362019
      PathPoint EO4_r_P1: torso (0.08831589 0.09776397 0.1202273)
      PathPoint default: Abdomen (0.006140654 -0.02455971 0.03172234)
    Millard2012EquilibriumMuscle EO5_r: max_isometric_force=155.945 optimal_fiber_length=0.04865363
        tendon_slack_length=0.05327289
      PathPoint EO5_r_P1: torso (0.001266937 0.1292621 0.1200601)
      PathPoint EO5_r_P2: pelvis (-0.05964142 0.08470509 0.1113326)
    Millard2012EquilibriumMuscle EO6_r: max_isometric_force=226.9645 optimal_fiber_length=0.05767726
        tendon_slack_length=0.05829523
      PathPoint EO6_r_P1: torso (-0.01393631 0.1092852 0.1071965)
      PathPoint EO6_r_P2: pelvis (-0.07482287 0.09606796 0.1069666)
    Millard2012EquilibriumMuscle IO1_r: max_isometric_force=123.9794 optimal_fiber_length=0.1130558
        tendon_slack_length=0.01253688
      PathPoint IO1_r_P1: Abdomen (0.003141466 -0.0480961 0.04502526)
      PathPoint IO1_r_P2: pelvis (-0.009759505 0.02582472 0.1375285)
    Millard2012EquilibriumMuscle IO2_r: max_isometric_force=150.0727 optimal_fiber_length=0.1162293
        tendon_slack_length=0.01296361
      PathPoint IO2_r_P1: Abdomen (0.003070327 -0.02251307 0.05321167)
      PathPoint IO2_r_P2: pelvis (-0.02602535 0.05061645 0.1397115)
    Millard2012EquilibriumMuscle IO3_r: max_isometric_force=151.2072 optimal_fiber_length=0.134929
        tendon_slack_length=0.01499211
      PathPoint IO3_r_P1: Abdomen (0.005117211 0.007163249 0.05014177)
      PathPoint IO3_r_P2: pelvis (-0.04229119 0.07127623 0.1277051)
    Millard2012EquilibriumMuscle IO4_r: max_isometric_force=179.0459 optimal_fiber_length=0.1111498
        tendon_slack_length=0.01232637
      PathPoint IO4_r_P1: torso (0.08361784 0.1269119 0.1297078)
      PathPoint IO4_r_P2: pelvis (-0.05747264 0.08470509 0.1091496)
    Millard2012EquilibriumMuscle IO5_r: max_isometric_force=157.0833 optimal_fiber_length=0.1096522
        tendon_slack_length=0.01222926
      PathPoint IO5_r_P1: torso (0.03800811 0.1128105 0.123276)
      PathPoint IO5_r_P2: pelvis (-0.08024481 0.09710095 0.0862282)
    Millard2012EquilibriumMuscle IO6_r: max_isometric_force=138.6115 optimal_fiber_length=0.1006295
        tendon_slack_length=0.01113647
      PathPoint IO6_r_P1: torso (0 0.1010594 0.1071965)
      PathPoint IO6_r_P2: pelvis (-0.09759505 0.09090302 0.07203875)
    Millard2012EquilibriumMuscle EO1_l: max_isometric_force=111.744 optimal_fiber_length=0.03880862
        tendon_slack_length=0.06163851
      PathPoint EO1_l_P1: Abdomen (0.006140654 0.04911942 -0.02148933)
      PathPoint EO1_l_P2: torso (0.1135079 0.2005231 -0.1062731)
    Millard2012EquilibriumMuscle EO2_l: max_isometric_force=132.3546 optimal_fiber_length=0.04008894
        tendon_slack_length=0.05830986
      PathPoint EO2_l_P1: torso (0.1152913 0.1656905 -0.1123205)
      PathPoint EO2_l_P2: Abdomen (0.008187538 0.02353639 -0.03376894)
    Millard2012EquilibriumMuscle EO3_l: max_isometric_force=138.8978 optimal_fiber_length=0.03857224
        tendon_slack_length=0.04678247
      PathPoint EO3_l_P1: torso (0.100088 0.1186861 -0.122204)
      PathPoint EO3_l_P2: Abdomen (0.006788452 -0.007808913 -0.03334949)
    Millard2012EquilibriumMuscle EO4_l: max_isometric_force=134.0928 optimal_fiber_length=0.03827359
        tendon_slack_length=0.04362201
      PathPoint EO4_l_P1: torso (0.08868559 0.09753412 -0.1200601)
      PathPoint EO4_l_P2: Abdomen (0.006536828 -0.02412111 -0.03135436)
    Millard2012EquilibriumMuscle EO5_l: max_isometric_force=155.945 optimal_fiber_length=0.04866912
        tendon_slack_length=0.05328984
      PathPoint EO5_l_P1: torso (0.0010203 0.129436 -0.119627)
      PathPoint EO5_l_P2: pelvis (-0.05931935 0.08422227 -0.1115051)
    Millard2012EquilibriumMuscle EO6_l: max_isometric_force=226.9645 optimal_fiber_length=0.05762235
        tendon_slack_length=0.05823973
      PathPoint EO6_l_P1: torso (-0.01393631 0.1092852 -0.1071965)
      PathPoint EO6_l_P2: pelvis (-0.07482287 0.09606796 -0.09714317)
    Millard2012EquilibriumMuscle IO1_l: max_isometric_force=123.9794 optimal_fiber_length=0.1130415
        tendon_slack_length=0.01253529
      PathPoint IO1_l_P1: Abdomen (0.003070327 -0.0480961 -0.04502526)
      PathPoint IO1_l_P2: pelvis (-0.009799963 0.02545832 -0.1375493)
    Millard2012EquilibriumMuscle IO2_l: max_isometric_force=150.0727 optimal_fiber_length=0.1161851
        tendon_slack_length=0.01295868
      PathPoint IO2_l_P1: Abdomen (0.003070327 -0.02251307 -0.05321167)
      PathPoint IO2_l_P2: pelvis (-0.02624472 0.05010481 -0.1390817)
    Millard2012EquilibriumMuscle IO3_l: max_isometric_force=151.2072 optimal_fiber_length=0.1349592
        tendon_slack_length=0.01499547
      PathPoint IO3_l_P1: Abdomen (0.005117211 0.007163249 -0.05014177)
      PathPoint IO3_l_P2: pelvis (-0.04175235 0.07098627 -0.1274518)
    Millard2012EquilibriumMuscle IO4_l: max_isometric_force=179.0459 optimal_fiber_length=0.111034
        tendon_slack_length=0.01231352
      PathPoint IO4_l_P1: torso (0.08318442 0.1267415 -0.1300262)
      PathPoint IO4_l_P2: pelvis (-0.05703671 0.08449962 -0.1087747)
    Millard2012EquilibriumMuscle IO5_l: max_isometric_force=157.0833 optimal_fiber_length=0.1096711
        tendon_slack_length=0.01223136
      PathPoint IO5_l_P1: torso (0.03837653 0.1127934 -0.1232706)
      PathPoint IO5_l_P2: pelvis (-0.08011013 0.09672277 -0.08626564)
    Millard2012EquilibriumMuscle IO6_l: max_isometric_force=138.6115 optimal_fiber_length=0.1006295
        tendon_slack_length=0.01113647
      PathPoint IO6_l_P1: torso (0 0.1010594 -0.1071965)
      PathPoint IO6_l_P2: pelvis (-0.09759505 0.09090302 -0.07203875)
    Millard2012EquilibriumMuscle LD_L1_r: max_isometric_force=90.39921 optimal_fiber_length=0.3830961
        tendon_slack_length=0.08368324
      PathPoint LD_L1_r_P1: lumbar1 (-0.0431293 -0.01245488 0.004160811)
      PathPoint LD_L1_r_P2: humerus_r (-0.009308611 -0.01498445 0.002636272)
      PathWrap: wrap_object=Chest_r method=hybrid
    Millard2012EquilibriumMuscle LD_L2_r: max_isometric_force=84.53986 optimal_fiber_length=0.4096494
        tendon_slack_length=0.08947818
      PathPoint LD_L2_r_P1: lumbar2 (-0.04177904 -0.01303823 0.004034885)
      PathPoint LD_L2_r_P2: humerus_r (-0.009311191 -0.01498189 0.002637518)
      PathWrap: wrap_object=Chest_r method=hybrid
    Millard2012EquilibriumMuscle LD_L3_r: max_isometric_force=104.5178 optimal_fiber_length=0.4283712
        tendon_slack_length=0.09349371
      PathPoint LD_L3_r_P1: lumbar3 (-0.04290276 -0.003704787 0.003598841)
      PathPoint LD_L3_r_P2: humerus_r (-0.009311191 -0.01498189 0.004245521)
      PathWrap: wrap_object=Chest_r method=hybrid
    Millard2012EquilibriumMuscle LD_L4_r: max_isometric_force=100.7279 optimal_fiber_length=0.4432793
        tendon_slack_length=0.09676037
      PathPoint LD_L4_r_P1: lumbar4 (-0.04650791 0.005171023 0.004777024)
      PathPoint LD_L4_r_P2: humerus_r (-0.009311191 -0.01498189 0.002637518)
      PathWrap: wrap_object=Chest_r method=hybrid
    Millard2012EquilibriumMuscle LD_L5_r: max_isometric_force=101.6877 optimal_fiber_length=0.4665924
        tendon_slack_length=0.09582307
      PathPoint LD_L5_r_P1: lumbar5 (-0.03886197 0.02271547 0.004436089)
      PathPoint LD_L5_r_P2: humerus_r (-0.009311191 -0.01498189 0.002637518)
      PathWrap: wrap_object=Chest_r method=hybrid
    Millard2012EquilibriumMuscle LD_T12_r: max_isometric_force=53.70586 optimal_fiber_length=0.3637262
        tendon_slack_length=0.07472565
      PathPoint LD_T12_r_P1: humerus_r (-0.009311191 -0.01498189 0.002637518)
      PathPoint LD_T12_r_P2: torso (-0.06588072 0.1198612 0.00467752)
      PathWrap: wrap_object=Chest_r method=hybrid range=(1 2)
    Millard2012EquilibriumMuscle LD_T11_r: max_isometric_force=62.91767 optimal_fiber_length=0.338769
        tendon_slack_length=0.06956761
      PathPoint LD_T11_r_P1: humerus_r (-0.009311191 -0.01498189 0.002637518)
      PathPoint LD_T11_r_P2: torso (-0.07997083 0.1539394 0.003215895)
      PathWrap: wrap_object=Chest_r method=hybrid
    Millard2012EquilibriumMuscle LD_T10_r: max_isometric_force=64.47899 optimal_fiber_length=0.3333146
        tendon_slack_length=0.05217695
      PathPoint LD_T10_r_P1: humerus_r (-0.009311191 -0.01498189 0.002637518)
      PathPoint LD_T10_r_P2: torso (-0.08741865 0.1856674 0.00410553)
      PathWrap: wrap_object=Chest_r method=hybrid
    Millard2012EquilibriumMuscle LD_T9_r: max_isometric_force=40.62457 optimal_fiber_length=0.2902552
        tendon_slack_length=0.04543423
      PathPoint LD_T9_r_P1: humerus_r (-0.009311191 -0.01498189 0.002637518)
      PathPoint LD_T9_r_P2: torso (-0.100088 0.2279713 0.004369855)
      PathWrap: wrap_object=Chest_r method=hybrid
    Millard2012EquilibriumMuscle LD_T8_r: max_isometric_force=40.79471 optimal_fiber_length=0.2685377
        tendon_slack_length=0.05511374
      PathPoint LD_T8_r_P1: humerus_r (-0.009311191 -0.01498189 0.002637518)
      PathPoint LD_T8_r_P2: torso (-0.1026219 0.2526486 0.004583123)
      PathWrap: wrap_object=Chest_r method=hybrid
    Millard2012EquilibriumMuscle LD_T7_r: max_isometric_force=37.075 optimal_fiber_length=0.2528065
        tendon_slack_length=0.0519217
      PathPoint LD_T7_r_P1: humerus_r (-0.009311191 -0.01498189 0.002637518)
      PathPoint LD_T7_r_P2: torso (-0.1140243 0.2761508 0.004366693)
      PathWrap: wrap_object=Chest_r method=hybrid
    Millard2012EquilibriumMuscle LD_R12_r: max_isometric_force=42.9003 optimal_fiber_length=0.3189823
        tendon_slack_length=0.06549801
      PathPoint LD_R12_r_P1: humerus_r (-0.009311191 -0.01498189 0.002637518)
      PathPoint LD_R12_r_P2: torso (-0.05701216 0.1428687 0.04745182)
    Millard2012EquilibriumMuscle LD_R11_r: max_isometric_force=63.33357 optimal_fiber_length=0.2781258
        tendon_slack_length=0.05713798
      PathPoint LD_R11_r_P1: humerus_r (-0.009311191 -0.01498189 0.004245521)
      PathPoint LD_R11_r_P2: torso (-0.08615171 0.1645154 0.0675338)
      PathWrap: wrap_object=Chest_r method=hybrid
    Millard2012EquilibriumMuscle LD_Il_r: max_isometric_force=65.36625 optimal_fiber_length=0.5243275
        tendon_slack_length=0.02266448
      PathPoint LD_Il_r_P1: pelvis (-0.1368781 0.05681439 0.05313731)
      PathPoint LD_Il_r_P2: humerus_r (-0.009311191 -0.01498189 0.002637518)
      PathWrap: wrap_object=Chest_r method=hybrid
    Millard2012EquilibriumMuscle LD_L1_l: max_isometric_force=90.39872 optimal_fiber_length=0.3830959
        tendon_slack_length=0.0836832
      PathPoint LD_L1_l_P1: lumbar1 (-0.0431293 -0.01245488 -0.004159235)
      PathPoint LD_L1_l_P2: humerus_l (-0.009308611 -0.01498189 -0.002637518)
      PathWrap: wrap_object=Chest_l method=hybrid
    Millard2012EquilibriumMuscle LD_L2_l: max_isometric_force=84.53965 optimal_fiber_length=0.4096507
        tendon_slack_length=0.08947846
      PathPoint LD_L2_l_P1: lumbar2 (-0.04177904 -0.01303356 -0.004038934)
      PathPoint LD_L2_l_P2: humerus_l (-0.009311191 -0.01498189 -0.002637518)
      PathWrap: wrap_object=Chest_l method=hybrid
    Millard2012EquilibriumMuscle LD_L3_l: max_isometric_force=104.5179 optimal_fiber_length=0.4283712
        tendon_slack_length=0.09349371
      PathPoint LD_L3_l_P1: lumbar3 (-0.04290276 -0.003704787 -0.003599112)
      PathPoint LD_L3_l_P2: humerus_l (-0.009311191 -0.01498189 -0.004245521)
      PathWrap: wrap_object=Chest_l method=hybrid
    Millard2012EquilibriumMuscle LD_L4_l: max_isometric_force=100.7277 optimal_fiber_length=0.4432792
        tendon_slack_length=0.09676037
      PathPoint LD_L4_l_P1: lumbar4 (-0.04650791 0.005171023 -0.004774152)
      PathPoint LD_L4_l_P2: humerus_l (-0.009311191 -0.01498189 -0.002637518)
      PathWrap: wrap_object=Chest_l method=hybrid
    Millard2012EquilibriumMuscle LD_L5_l: max_isometric_force=101.6877 optimal_fiber_length=0.4665924
        tendon_slack_length=0.09582307
      PathPoint LD_L5_l_P1: lumbar5 (-0.03886197 0.02271547 -0.004435302)
      PathPoint LD_L5_l_P2: humerus_l (-0.009311191 -0.01498189 -0.002637518)
      PathWrap: wrap_object=Chest_l method=hybrid
    Millard2012EquilibriumMuscle LD_T12_l: max_isometric_force=53.70584 optimal_fiber_length=0.363726
        tendon_slack_length=0.07472559
      PathPoint LD_T12_l_P1: humerus_l (-0.009311191 -0.01498189 -0.002637518)
      PathPoint LD_T12_l_P2: torso (-0.06588072 0.1198612 -0.004673768)
      PathWrap: wrap_object=Chest_l method=hybrid
    Millard2012EquilibriumMuscle LD_T11_l: max_isometric_force=62.91771 optimal_fiber_length=0.3387961
        tendon_slack_length=0.06957317
      PathPoint LD_T11_l_P1: humerus_l (-0.009311191 -0.01498189 -0.002637518)
      PathPoint LD_T11_l_P2: torso (-0.07997083 0.1539394 -0.003708999)
      PathWrap: wrap_object=Chest_l method=hybrid
    Millard2012EquilibriumMuscle LD_T10_l: max_isometric_force=64.47901 optimal_fiber_length=0.3333146
        tendon_slack_length=0.05217695
      PathPoint LD_T10_l_P1: humerus_l (-0.009311191 -0.01498189 -0.002637518)
      PathPoint LD_T10_l_P2: torso (-0.08741865 0.1856674 -0.004105627)
      PathWrap: wrap_object=Chest_l method=hybrid
    Millard2012EquilibriumMuscle LD_T9_l: max_isometric_force=40.62456 optimal_fiber_length=0.2902555
        tendon_slack_length=0.04543426
      PathPoint LD_T9_l_P1: humerus_l (-0.009311191 -0.01498189 -0.002637518)
      PathPoint LD_T9_l_P2: torso (-0.100088 0.2279713 -0.004373618)
      PathWrap: wrap_object=Chest_l method=hybrid
    Millard2012EquilibriumMuscle LD_T8_l: max_isometric_force=40.79465 optimal_fiber_length=0.268538
        tendon_slack_length=0.05511379
      PathPoint LD_T8_l_P1: humerus_l (-0.009311191 -0.01498189 -0.002637518)
      PathPoint LD_T8_l_P2: torso (-0.1026219 0.2526486 -0.004588011)
      PathWrap: wrap_object=Chest_l method=hybrid
    Millard2012EquilibriumMuscle LD_T7_l: max_isometric_force=37.07495 optimal_fiber_length=0.2528063
        tendon_slack_length=0.05192165
      PathPoint LD_T7_l_P1: humerus_l (-0.009311191 -0.01498189 -0.002637518)
      PathPoint LD_T7_l_P2: torso (-0.1140243 0.2761508 -0.004362898)
      PathWrap: wrap_object=Chest_l method=hybrid
    Millard2012EquilibriumMuscle LD_R12_l: max_isometric_force=42.9003 optimal_fiber_length=0.3189827
        tendon_slack_length=0.06549808
      PathPoint LD_l12_l_P1: humerus_l (-0.009311191 -0.01498189 -0.002637518)
      PathPoint LD_l12_l_P2: torso (-0.05701216 0.1428687 -0.0474559)
      PathWrap: wrap_object=Chest_l method=hybrid
    Millard2012EquilibriumMuscle LD_R11_l: max_isometric_force=63.33359 optimal_fiber_length=0.2781258
        tendon_slack_length=0.05713798
      PathPoint LD_l11_l_P1: humerus_l (-0.009311191 -0.01498189 -0.004245521)
      PathPoint LD_l11_l_P2: torso (-0.08615171 0.1645154 -0.0675338)
      PathWrap: wrap_object=Chest_l method=hybrid
    Millard2012EquilibriumMuscle LD_Il_l: max_isometric_force=65.36622 optimal_fiber_length=0.5266347
        tendon_slack_length=0.02276421
      PathPoint LD_Il_l_P1: pelvis (-0.1234816 0.07657608 -0.05874356)
      PathPoint LD_Il_l_P2: humerus_l (-0.009311191 -0.01498189 -0.002637518)
      PathWrap: wrap_object=Chest_l method=hybrid
    CoordinateActuator [values shared by the 33 below unless stated]: min_control=-10000 max_control=10000
        optimal_force=200
    CoordinateActuator residual_pelvis_tx: coordinate=pelvis_tx optimal_force=100
    CoordinateActuator residual_pelvis_ty: coordinate=pelvis_ty
    CoordinateActuator residual_pelvis_tz: coordinate=pelvis_tz optimal_force=100
    CoordinateActuator residual_pelvis_tilt: coordinate=pelvis_tilt optimal_force=80
    CoordinateActuator residual_pelvis_list: coordinate=pelvis_list optimal_force=80
    CoordinateActuator residual_pelvis_rotation: coordinate=pelvis_rotation optimal_force=80
    CoordinateActuator reserve_L5_S1_Flex_Ext: coordinate=L5_S1_Flex_Ext optimal_force=10
    CoordinateActuator reserve_L5_S1_Lat_Bending: coordinate=L5_S1_Lat_Bending optimal_force=5
    CoordinateActuator reserve_L5_S1_axial_rotation: coordinate=L5_S1_axial_rotation optimal_force=5
    CoordinateActuator reserve_arm_flex_l: coordinate=arm_flex_l
    CoordinateActuator reserve_arm_add_l: coordinate=arm_add_l
    CoordinateActuator reserve_arm_rot_l: coordinate=arm_rot_l
    CoordinateActuator reserve_elbow_flex_l: coordinate=elbow_flex_l
    CoordinateActuator reserve_pro_sup_l: coordinate=pro_sup_l
    CoordinateActuator reserve_wrist_flex_l: coordinate=wrist_flex_l
    CoordinateActuator reserve_wrist_dev_l: coordinate=wrist_dev_l
    CoordinateActuator reserve_hip_rotation_l: coordinate=hip_rotation_l
    CoordinateActuator reserve_hip_flexion_l: coordinate=hip_flexion_l
    CoordinateActuator reserve_hip_adduction_l: coordinate=hip_adduction_l
    CoordinateActuator reserve_knee_angle_l: coordinate=knee_angle_l
    CoordinateActuator reserve_ankle_angle_l: coordinate=ankle_angle_l
    CoordinateActuator reserve_arm_flex_r: coordinate=arm_flex_r
    CoordinateActuator reserve_arm_add_r: coordinate=arm_add_r
    CoordinateActuator reserve_arm_rot_r: coordinate=arm_rot_r
    CoordinateActuator reserve_elbow_flex_r: coordinate=elbow_flex_r
    CoordinateActuator reserve_pro_sup_r: coordinate=pro_sup_r
    CoordinateActuator reserve_wrist_flex_r: coordinate=wrist_flex_r
    CoordinateActuator reserve_wrist_dev_r: coordinate=wrist_dev_r
    CoordinateActuator reserve_hip_rotation_r: coordinate=hip_rotation_r
    CoordinateActuator reserve_hip_flexion_r: coordinate=hip_flexion_r
    CoordinateActuator reserve_hip_adduction_r: coordinate=hip_adduction_r
    CoordinateActuator reserve_knee_angle_r: coordinate=knee_angle_r
    CoordinateActuator reserve_ankle_angle_r: coordinate=ankle_angle_r
    ObjectGroup R_hip_abd
    ObjectGroup R_hip_flex
    ObjectGroup R_hip_inrot
    ObjectGroup R_hip_exrot
    ObjectGroup R_hip_ext
    ObjectGroup R_hip_add
    ObjectGroup R_knee_bend
    ObjectGroup R_knee_ext
    ObjectGroup R_ankle_pf
    ObjectGroup R_inverter
    ObjectGroup R_ankle_df
    ObjectGroup R_everter
    ObjectGroup L_hip_abd
    ObjectGroup L_hip_flex
    ObjectGroup L_hip_inrot
    ObjectGroup L_hip_exrot
    ObjectGroup L_hip_ext
    ObjectGroup L_hip_add
    ObjectGroup L_knee_bend
    ObjectGroup L_knee_ext
    ObjectGroup L_ankle_pf
    ObjectGroup L_inverter
    ObjectGroup L_ankle_df
    ObjectGroup L_everter
    ObjectGroup back_ext
    ObjectGroup back_rlb: members=(EO1_r EO2_r EO3_r EO4_r EO5_r EO6_r IO1_r IO2_r IO3_r IO4_r IO5_r IO6_r)
    ObjectGroup back_introt: members=(EO1_l EO2_l EO3_l EO4_l EO5_l EO6_l IO1_r IO2_r IO3_r IO4_r IO5_r IO6_r)
    ObjectGroup back_llb: members=(EO1_l EO2_l EO3_l EO4_l EO5_l EO6_l IO1_l IO2_l IO3_l IO4_l IO5_l IO6_l)
    ObjectGroup back_extrot: members=(EO1_r EO2_r EO3_r EO4_r EO5_r EO6_r IO1_l IO2_l IO3_l IO4_l IO5_l IO6_l)
    ObjectGroup back_flex: members=(EO1_l EO2_l EO3_l EO4_l EO5_l EO6_l EO1_r EO2_r EO3_r EO4_r EO5_r EO6_r IO1_l IO2_l IO3_l IO4_l IO5_l IO6_l IO1_r IO2_r IO3_r IO4_r IO5_r IO6_r)
    ObjectGroup quadratus_lumborum
    ObjectGroup Psoas_major: members=(Ps_L1_L2_IVD_r Ps_L2_L3_IVD_r Ps_L3_L4_IVD_r Ps_L4_L5_IVD_r Ps_L1_L2_IVD_l Ps_L2_L3_IVD_l Ps_L3_L4_IVD_l Ps_L4_L5_IVD_l Ps_L1_TP_r Ps_L2_TP_r Ps_L3_TP_r Ps_L4_TP_r Ps_L5_TP_r Ps_L1_TP_l Ps_L2_TP_l Ps_L3_TP_l Ps_L4_TP_l Ps_L5_TP_l Ps_L1_VB_r Ps_L1_VB_l Ps_L5_VB_r Ps_L5_VB_l)
    ObjectGroup Ext_Oblique: members=(EO1_l EO2_l EO3_l EO4_l EO5_l EO6_l EO1_r EO2_r EO3_r EO4_r EO5_r EO6_r)
    ObjectGroup Int_Oblique: members=(IO1_l IO2_l IO3_l IO4_l IO5_l IO6_l IO1_r IO2_r IO3_r IO4_r IO5_r IO6_r)
    ObjectGroup Rectus_Abdominis: members=(rect_abd_r rect_abd_l)
    ObjectGroup Multifidus_spinous_process: members=(MF_m1t_1_r MF_m1t_2_r MF_m1t_3_r MF_m2t_1_r MF_m2t_2_r MF_m2t_3_r MF_m3t_1_r MF_m3t_2_r MF_m3t_3_r MF_m4t_1_r MF_m4t_2_r MF_m4t_3_r MF_m5t_1_r MF_m5t_2_r MF_m5t_3_r MF_m1t_1_l MF_m1t_2_l MF_m1t_3_l MF_m2t_1_l MF_m2t_2_l MF_m2t_3_l MF_m3t_1_l MF_m3t_2_l MF_m3t_3_l MF_m4t_1_l MF_m4t_2_l MF_m4t_3_l MF_m5t_1_l MF_m5t_2_l MF_m5t_3_l MF_m1s_r MF_m2s_r MF_m3s_r MF_m4s_r MF_m5s_r MF_m1s_l MF_m2s_l MF_m3s_l MF_m4s_l MF_m5s_l)
    ObjectGroup Multifidus_entry_level: members=(MF_m1_laminar_r MF_m2_laminar_r MF_m3_laminar_r MF_m4_laminar_r MF_m5_laminar_r MF_m1_laminar_l MF_m2_laminar_l MF_m3_laminar_l MF_m4_laminar_l MF_m5_laminar_l)
    ObjectGroup iliocostalis_lumborum_pars_lumborum: members=(IL_L4_l IL_L4_r IL_L3_l IL_L3_r IL_L2_l IL_L2_r IL_L1_l IL_L1_r)
    ObjectGroup iliocostalis_lumborum_pars_thoracis_left: members=(IL_R12_l IL_R11_l IL_R10_l IL_R9_l IL_R8_l IL_R7_l IL_R6_l IL_R5_l)
    ObjectGroup iliocostalis_lumborum_pars_thoracis_right: members=(IL_R12_r IL_R11_r IL_R10_r IL_R9_r IL_R8_r IL_R7_r IL_R6_r IL_R5_r)
    ObjectGroup longissimus_thoracis_pars_thoracis_left: members=(LTpT_R12_l LTpT_R11_l LTpT_R10_l LTpT_R9_l LTpT_R8_l LTpT_R7_l LTpT_R6_l LTpT_R5_l LTpT_R4_l LTpT_T12_l LTpT_T11_l LTpT_T10_l LTpT_T9_l LTpT_T8_l LTpT_T7_l LTpT_T6_l LTpT_T5_l LTpT_T4_l LTpT_T3_l LTpT_T2_l LTpT_T1_l)
    ObjectGroup longissimus_thoracis_pars_thoracis_right: members=(LTpT_R12_r LTpT_R11_r LTpT_R10_r LTpT_R9_r LTpT_R8_r LTpT_R7_r LTpT_R6_r LTpT_R5_r LTpT_R4_r LTpT_T12_r LTpT_T11_r LTpT_T10_r LTpT_T9_r LTpT_T8_r LTpT_T7_r LTpT_T6_r LTpT_T5_r LTpT_T4_r LTpT_T3_r LTpT_T2_r LTpT_T1_r)
    ObjectGroup longissimus_thoracis_pars_lumborum: members=(LTpL_L5_r LTpL_L4_r LTpL_L3_r LTpL_L2_r LTpL_L1_r LTpL_L5_l LTpL_L4_l LTpL_L3_l LTpL_L2_l LTpL_L1_l)
    ObjectGroup Latissimus Dorsi: members=(LD_Il_l LD_Il_r LD_T7_l LD_T8_l LD_T9_l LD_T10_l LD_T11_l LD_T12_l LD_R11_l LD_R12_l LD_L1_l LD_L2_l LD_L3_l LD_L4_l LD_L5_l LD_T7_r LD_T8_r LD_T9_r LD_T10_r LD_T11_r LD_T12_r LD_R11_r LD_R12_r LD_L1_r LD_L2_r LD_L3_r LD_L4_r LD_L5_r)
  MarkerSet:
    Marker LFHD: torso (0.07333677 0.7071995 -0.06637262)
    Marker RFHD: torso (0.0720751 0.7075321 0.06548673)
    Marker LBHD: torso (-0.07564744 0.7031824 -0.0661395)
    Marker RBHD: torso (-0.07607981 0.7038226 0.06491797)
    Marker LSHO: torso (0.009805812 0.5014092 -0.1490491)
    Marker RSHO: torso (0.01049398 0.5015076 0.1497086)
    Marker CLAV: torso (0.05807377 0.4460149 0.0005552525)
    Marker STRN: torso (0.1559161 0.2161083 0.0003762484)
    Marker C7: torso (-0.08157075 0.4938007 -0.001903467)
    Marker T10: torso (-0.1192203 0.1892636 -0.001306568)
    Marker LASI: pelvis (0.01324302 0.01784945 -0.1370758)
    Marker RASI: pelvis (0.01354541 0.01832007 0.1387381)
    Marker LPSI: pelvis (-0.1702038 0.03862697 -0.05870919)
    Marker RPSI: pelvis (-0.1694348 0.03875327 0.06090944)
    Marker LGTR: femur_l (-0.01759834 -0.02065115 -0.0945127)
    Marker RGTR: femur_r (-0.01500485 -0.02053038 0.09678128)
    Marker LKNE: femur_l (0.01490176 -0.3937947 -0.04953809)
    Marker RKNE: femur_r (0.01502445 -0.3947173 0.04983329)
    Marker LMFC: femur_l (0.006748312 -0.397382 0.04860439)
    Marker RMFC: femur_r (0.004963542 -0.3961185 -0.04928483)
    Marker LLTP: tibia_l (0.01034807 -0.04646327 -0.04702575)
    Marker RLTP: tibia_r (0.01176766 -0.04596613 0.04713961)
    Marker LMTP: tibia_l (0.01254324 -0.04931779 0.05184041)
    Marker RMTP: tibia_r (0.01021464 -0.05013567 -0.05189228)
    Marker LANK: tibia_l (-0.007129027 -0.4176818 -0.05506003)
    Marker RANK: tibia_r (-0.005031977 -0.4172793 0.0533456)
    Marker LMMA: tibia_l (0.006745464 -0.3955455 0.03968476)
    Marker RMMA: tibia_r (0.005471637 -0.395725 -0.04138472)
    Marker LTOE: calcn_l (0.1940051 0.03423637 -0.001697347)
    Marker RTOE: calcn_r (0.1944948 0.0315933 0.005606492)
    Marker LMT5: calcn_l (0.1450041 0.006718405 -0.0616912)
    Marker RMT5: calcn_r (0.1443382 0.008584828 0.06424352)
    Marker LHEE: calcn_l (-0.02422531 0.02730352 0.004163067)
    Marker RHEE: calcn_r (-0.02256032 0.03064923 -0.009656508)
    Marker LUPA: humerus_l (-0.02403783 -0.181635 -0.0009208748)
    Marker RUPA: humerus_r (0.02682608 -0.09594338 0.04743719)
    Marker LELB: humerus_l (-0.01219519 -0.271228 -0.0137353)
    Marker RELB: humerus_r (-0.01342581 -0.2717949 0.01271362)
    Marker LFRA: ulna_l (-0.03450836 -0.1607221 -0.03521356)
    Marker RFRA: ulna_r (-0.05008646 -0.06763598 0.02671696)
    Marker LWRA: radius_l (0.0005596231 -0.2276873 -0.04993149)
    Marker LWRB: radius_l (-0.01762568 -0.2366097 0.01711648)
    Marker RWRA: radius_r (0.0007562261 -0.2275281 0.0473622)
    Marker RWRB: radius_r (-0.01838061 -0.2356639 -0.01497983)
    Marker LFN2: hand_l (-0.04191906 -0.05187988 -0.02371328)
    Marker RFN2: hand_r (-0.031133 -0.04341549 0.02977007)
    Marker LFN5: hand_l (-0.01238889 -0.04221495 0.04611921)
    Marker RFN5: hand_r (-0.006604745 -0.04637245 -0.04838715)
    Marker LTA_BOX: box_15kg_half_l (0.3496 0.295 0.01539)
    Marker LTP_BOX: box_15kg_half_l (0.0704 0.295 0.01539)
    Marker LBA_BOX: box_15kg_half_l (0.3496 0.015 -0.01461)
    Marker LBP_BOX: box_15kg_half_l (0.0704 0.015 -0.01461)
    Marker RTA_BOX: box_15kg_half_r (0.3496 0.295 0.19312)
    Marker RTP_BOX: box_15kg_half_r (0.0704 0.295 0.19312)
    Marker RBA_BOX: box_15kg_half_r (0.3496 0.015 0.22312)
    Marker RBP_BOX: box_15kg_half_r (0.0704 0.015 0.22312)
