# OpenSim document version 40000
InverseKinematicsTool SUB1:
  constraint_weight: 20
  accuracy: 1e-5
  time_range: 128.27 129.88
  output_motion_file: E:\Dropbox\SEL\BOX\OpenSim\_Main_\c_AddBio_Continous\SUB1\APP3\trial15_10_1\IK_Results\15_10_trial1_D10_IK.mot
  report_errors: true
  marker_file: E:\Dropbox\SEL\BOX\OpenSim\_Main_\c_AddBio_Continous\SUB1\UpDown_TrcMot\15_10_trial1_D10.trc
  IKTaskSet:
    IKMarkerTask LSHO: apply=true weight=250
    IKMarkerTask RSHO: apply=true weight=250
    IKMarkerTask STRN: apply=true weight=1
    IKMarkerTask C7: apply=true weight=1
    IKMarkerTask T10: apply=true weight=1
    IKMarkerTask LASI: apply=true weight=800
    IKMarkerTask RASI: apply=true weight=800
    IKMarkerTask LPSI: apply=true weight=800
    IKMarkerTask RPSI: apply=true weight=800
    IKMarkerTask LGTR: apply=true weight=350
    IKMarkerTask RGTR: apply=true weight=350
    IKMarkerTask LKNE: apply=true weight=600
    IKMarkerTask RKNE: apply=true weight=600
    IKMarkerTask LANK: apply=true weight=200
    IKMarkerTask RANK: apply=true weight=200
    IKMarkerTask LTOE: apply=true weight=350
    IKMarkerTask RTOE: apply=true weight=350
    IKMarkerTask LMT5: apply=true weight=100
    IKMarkerTask RMT5: apply=true weight=100
    IKMarkerTask LHEE: apply=true weight=250
    IKMarkerTask RHEE: apply=true weight=250
    IKMarkerTask LUPA: apply=false weight=1
    IKMarkerTask RUPA: apply=false weight=1
    IKMarkerTask LELB: apply=true weight=250
    IKMarkerTask RELB: apply=true weight=250
    IKMarkerTask LFRA: apply=false weight=1
    IKMarkerTask RFRA: apply=false weight=1
    IKMarkerTask LWRA: apply=true weight=150
    IKMarkerTask LWRB: apply=true weight=150
    IKMarkerTask RWRA: apply=true weight=150
    IKMarkerTask RWRB: apply=true weight=150
    IKMarkerTask LFN2: apply=true weight=100
    IKMarkerTask RFN2: apply=true weight=100
    IKMarkerTask LFN5: apply=true weight=100
    IKMarkerTask RFN5: apply=true weight=100
    IKMarkerTask LTA_BOX: apply=true weight=100
    IKMarkerTask LTP_BOX: apply=true weight=100
    IKMarkerTask LBA_BOX: apply=true weight=100
    IKMarkerTask LBP_BOX: apply=true weight=100
    IKMarkerTask RTA_BOX: apply=true weight=100
    IKMarkerTask RTP_BOX: apply=true weight=100
    IKMarkerTask RBA_BOX: apply=true weight=100
    IKMarkerTask RBP_BOX: apply=true weight=100
    IKCoordinateTask subtalar_angle_r: apply=true weight=1000 value_type=default_value value=0
    IKCoordinateTask mtp_angle_r: apply=true weight=1000 value_type=default_value value=0
    IKCoordinateTask subtalar_angle_l: apply=true weight=1000 value_type=default_value value=0
    IKCoordinateTask mtp_angle_l: apply=true weight=1000 value_type=default_value value=0
