# OpenSim document version 40000
AnalyzeTool SUB1_15_10_2_D10_APP4:
  model_file: E:\Dropbox\SEL\BOX\OpenSim\_Main_\c_AddBio_Continous\SUB1\APP4\SUB1_Scaled_AddBiomech_APP4.osim
  replace_force_set: false
  results_directory: E:\Dropbox\SEL\BOX\OpenSim\_Main_\c_AddBio_Continous\SUB1\APP4\trial15_10_2\SO_Results
  output_precision: 8
  initial_time: 115.17
  final_time: 116.57
  solve_for_equilibrium_for_auxiliary_states: true
  maximum_number_of_integrator_steps: 20000
  maximum_integrator_step_size: 1
  minimum_integrator_step_size: 1e-8
  integrator_error_tolerance: 1e-5
  external_loads_file: E:\Dropbox\SEL\BOX\OpenSim\_Main_\c_AddBio_Continous\SUB1\APP3\trial15_10_2\xml_ExtLoad\SETUP_ExtLoad_15_10_trial2_D10_APP3.xml
  coordinates_file: E:\Dropbox\SEL\BOX\OpenSim\_Main_\c_AddBio_Continous\SUB1\APP3\trial15_10_2\IK_Results\15_10_trial2_D10_IK.mot
  lowpass_cutoff_frequency_for_coordinates: 6
  AnalysisSet Analyses:
    StaticOptimization: start_time=115.17 end_time=116.57 step_interval=1 in_degrees=true use_model_force_set=true
        activation_exponent=2 use_muscle_physiology=true optimizer_convergence_criterion=0.0001
        optimizer_max_iterations=100
