# OpenSim document version 40000
ScaleTool LFB_SUB1:
  mass: 75.16 [kg]
  height: 1.74
  age: -1
  notes: male
  GenericModelMaker:
    marker_set_file: LFB_Scale_MarkerSet_APP1,2.xml
  ModelScaler:
    apply: true
    scaling_order: measurements
    marker_file: E:/Dropbox/SEL/BOX/OpenSim/_Main_/SUB1/STATIC/../UpDown_TrcMot/Static.trc
    time_range: 1 2.27
    preserve_mass_distribution: true
    output_scale_file: SUB1_ScaleSet.xml
    MeasurementSet:
      Measurement thigh: apply=true
        MarkerPair: markers=(RGTR RKNE)
        MarkerPair: markers=(LGTR LKNE)
        BodyScale femur_r: axes=(X Y Z)
        BodyScale patella_r: axes=(X Y Z)
        BodyScale femur_l: axes=(X Y Z)
        BodyScale patella_l: axes=(X Y Z)
      Measurement foot: apply=true
        MarkerPair: markers=(LHEE LTOE)
        MarkerPair: markers=(RHEE RTOE)
        BodyScale calcn_r: axes=(X Y Z)
        BodyScale toes_r: axes=(X Y Z)
        BodyScale calcn_l: axes=(X Y Z)
        BodyScale toes_l: axes=(X Y Z)
      Measurement pelvis: apply=true
        MarkerPair: markers=(RASI RPSI)
        MarkerPair: markers=(LASI LPSI)
        MarkerPair: markers=(LASI RASI)
        MarkerPair: markers=(RPSI LPSI)
        BodyScale pelvis: axes=(X Y Z)
        BodyScale sacrum: axes=(X Y Z)
      Measurement shank: apply=true
        MarkerPair: markers=(LKNE LANK)
        MarkerPair: markers=(RKNE RANK)
        BodyScale tibia_r: axes=(X Y Z)
        BodyScale talus_r: axes=(X Y Z)
        BodyScale tibia_l: axes=(X Y Z)
        BodyScale talus_l: axes=(X Y Z)
      Measurement torso: apply=true
        MarkerPair: markers=(LPSI LBHD)
        MarkerPair: markers=(RPSI RBHD)
        MarkerPair: markers=(RASI RFHD)
        MarkerPair: markers=(LASI LFHD)
        BodyScale lumbar5: axes=(X Y Z)
        BodyScale lumbar4: axes=(X Y Z)
        BodyScale lumbar3: axes=(X Y Z)
        BodyScale lumbar2: axes=(X Y Z)
        BodyScale lumbar1: axes=(X Y Z)
        BodyScale torso: axes=(X Y Z)
        BodyScale Abdomen: axes=(X Y Z)
      Measurement humerus: apply=true
        MarkerPair: markers=(RSHO RELB)
        MarkerPair: markers=(LSHO LELB)
        BodyScale humerus_r: axes=(X Y Z)
        BodyScale humerus_l: axes=(X Y Z)
      Measurement radius_ulna: apply=true
        MarkerPair: markers=(LELB LWRA)
        MarkerPair: markers=(RELB RWRA)
        MarkerPair: markers=(LELB LWRB)
        MarkerPair: markers=(RELB RWRB)
        BodyScale ulna_r: axes=(X Y Z)
        BodyScale radius_r: axes=(X Y Z)
        BodyScale ulna_l: axes=(X Y Z)
        BodyScale radius_l: axes=(X Y Z)
      Measurement hand: apply=true
        MarkerPair: markers=(RWRB RFN2)
        MarkerPair: markers=(RWRA RFN2)
        MarkerPair: markers=(LWRB LFN2)
        MarkerPair: markers=(LWRA LFN2)
        BodyScale hand_r: axes=(X Y Z)
        BodyScale hand_l: axes=(X Y Z)
  MarkerPlacer:
    apply: true
    marker_file: E:/Dropbox/SEL/BOX/OpenSim/_Main_/SUB1/STATIC/../UpDown_TrcMot/Static.trc
    time_range: 1 2.27
    output_motion_file: SUB1_Static_output.mot
    output_model_file: SUB1_Scaled.osim
    max_marker_movement: -1
    IKTaskSet subject01_Scale:
      IKMarkerTask LFHD: apply=false weight=1
      IKMarkerTask RFHD: apply=false weight=1
      IKMarkerTask LBHD: apply=false weight=1
      IKMarkerTask RBHD: apply=false weight=1
      IKMarkerTask LSHO: apply=true weight=200
      IKMarkerTask RSHO: apply=true weight=200
      IKMarkerTask CLAV: apply=true weight=200
      IKMarkerTask STRN: apply=true weight=1
      IKMarkerTask C7: apply=true weight=300
      IKMarkerTask RBAK: apply=false weight=1
      IKMarkerTask T10: apply=true weight=50
      IKMarkerTask LASI: apply=true weight=100
      IKMarkerTask RASI: apply=true weight=100
      IKMarkerTask LPSI: apply=true weight=100
      IKMarkerTask RPSI: apply=true weight=100
      IKMarkerTask LGTR: apply=true weight=100
      IKMarkerTask RGTR: apply=true weight=100
      IKMarkerTask LKNE: apply=true weight=50
      IKMarkerTask RKNE: apply=true weight=50
      IKMarkerTask LMFC: apply=true weight=50
      IKMarkerTask RMFC: apply=true weight=50
      IKMarkerTask LLTP: apply=true weight=50
      IKMarkerTask RLTP: apply=true weight=50
      IKMarkerTask LMTP: apply=true weight=50
      IKMarkerTask RMTP: apply=true weight=50
      IKMarkerTask LANK: apply=true weight=50
      IKMarkerTask RANK: apply=true weight=50
      IKMarkerTask LMMA: apply=true weight=50
      IKMarkerTask RMMA: apply=true weight=50
      IKMarkerTask LTOE: apply=true weight=100
      IKMarkerTask RTOE: apply=true weight=100
      IKMarkerTask LMT5: apply=false weight=1
      IKMarkerTask RMT5: apply=false weight=1
      IKMarkerTask LHEE: apply=true weight=100
      IKMarkerTask RHEE: apply=true weight=100
      IKMarkerTask LUPA: apply=false weight=1
      IKMarkerTask RUPA: apply=false weight=1
      IKMarkerTask LELB: apply=true weight=100
      IKMarkerTask RELB: apply=true weight=100
      IKMarkerTask LFRA: apply=false weight=1
      IKMarkerTask RFRA: apply=false weight=1
      IKMarkerTask LWRA: apply=true weight=200
      IKMarkerTask LWRB: apply=true weight=200
      IKMarkerTask RWRA: apply=true weight=200
      IKMarkerTask RWRB: apply=true weight=200
      IKMarkerTask LFN2: apply=true weight=50
      IKMarkerTask RFN2: apply=true weight=50
      IKMarkerTask LFN5: apply=true weight=5
      IKMarkerTask RFN5: apply=true weight=5
      IKCoordinateTask pelvis_tilt: apply=true weight=1 value_type=default_value value=0
      IKCoordinateTask pelvis_list: apply=true weight=1 value_type=default_value value=0
      IKCoordinateTask hip_flexion_r: apply=false weight=1 value_type=default_value value=0
      IKCoordinateTask hip_rotation_r: apply=true weight=5 value_type=manual_value value=-0.08726646
      IKCoordinateTask ankle_angle_r: apply=true weight=10 value_type=manual_value value=0.00872665
      IKCoordinateTask hip_flexion_l: apply=false weight=1 value_type=default_value value=0
      IKCoordinateTask hip_rotation_l: apply=true weight=5 value_type=manual_value value=-0.08726646
      IKCoordinateTask ankle_angle_l: apply=true weight=10 value_type=manual_value value=0.00872665
      IKCoordinateTask arm_flex_r: apply=false weight=5 value_type=default_value value=0
      IKCoordinateTask arm_rot_r: apply=false weight=5 value_type=default_value value=0
      IKCoordinateTask elbow_flex_r: apply=false weight=1 value_type=manual_value value=0.08726646
      IKCoordinateTask pro_sup_r: apply=false weight=1 value_type=default_value value=1.570796
      IKCoordinateTask wrist_flex_r: apply=true weight=1 value_type=default_value value=0
      IKCoordinateTask wrist_dev_r: apply=true weight=1 value_type=default_value value=0
      IKCoordinateTask arm_flex_l: apply=false weight=5 value_type=default_value value=0
      IKCoordinateTask arm_rot_l: apply=false weight=5 value_type=default_value value=0
      IKCoordinateTask elbow_flex_l: apply=false weight=1 value_type=manual_value value=0.08726646
      IKCoordinateTask pro_sup_l: apply=false weight=1 value_type=default_value value=1.570796
      IKCoordinateTask wrist_flex_l: apply=true weight=1 value_type=default_value value=0
      IKCoordinateTask wrist_dev_l: apply=true weight=1 value_type=default_value value=0
